// SBML level 3 version 1

function T_CM_sp(v, kf, kr, s, p, Kms, Kmp, ms, mp)
  (kf*(s/Kms)^ms - kr*(p/Kmp)^mp)/((1 + s/Kms)^ms + (1 + p/Kmp)^mp - 1);
end

function Reg_T_CM_asp(v, ra, kf, kr, a, s, p, Kma, Kms, Kmp, wa, ms, mp)
  (ra + (1 - ra)*(a/Kma/(1 + a/Kma)))^wa*(kf*(s/Kms)^ms - kr*(p/Kmp)^mp)/((1 + s/Kms)^ms + (1 + p/Kmp)^mp - 1);
end

function Reg_T_CM_isp(v, ri, kf, kr, i, s, p, Kmi, Kms, Kmp, wi, ms, mp)
  (ri + (1 - ri)*(1/(1 + i/Kmi)))^wi*(kf*(s/Kms)^ms - kr*(p/Kmp)^mp)/((1 + s/Kms)^ms + (1 + p/Kmp)^mp - 1);
end

function Reg_T_CM_iiisp(v, ri1, ri2, ri3, kf, kr, i1, i2, i3, s, p, Kmi1, Kmi2, Kmi3, Kms, Kmp, wi1, wi2, wi3, ms, mp)
  (ri1 + (1 - ri1)*(1/(1 + i1/Kmi1)))^wi1*(ri2 + (1 - ri2)*(1/(1 + i2/Kmi2)))^wi2*(ri3 + (1 - ri3)*(1/(1 + i3/Kmi3)))^wi3*(kf*(s/Kms)^ms - kr*(p/Kmp)^mp)/((1 + s/Kms)^ms + (1 + p/Kmp)^mp - 1);
end

model coarse_grained_EGF()

  // Compartments:
  compartment default_compartment = 1;
  compartment extra = 5000;

  // Species:
  species L in extra = 500000;
  species ppErk in default_compartment = 0;
  species tRas in default_compartment = 0;
  species Rp in default_compartment = 0;

  // Parameters:
  Mig6 = 0;
  Spry2 = 0;
  Precursor = 0;
  v1 = 2.198555e-5;
  ro1 = 0.0006249083;
  k1 = 191.525;
  k2 = 8.747483e-5;
  KmPre = 115.5012;
  KmE = 0.0165805;
  KmL = 1.503071;
  w1 = 13.1039;
  m1 = 0.009442422;
  m2 = 0.007885125;
  v2 = 4.793037e-8;
  ro2 = 1.784172;
  k3 = 0.6673318;
  k4 = 0.002040795;
  KmMig = 5.286497e-5;
  KmP = 88.67367;
  w2 = 9.205374e-5;
  m3 = 0.3610352;
  m4 = 0.001347746;
  kLSink = 2.03772e-6;
  kRpSink = 0.2219705;
  v3 = 1.763033e-8;
  ro3 = 5.823868e-6;
  ro4 = 0.0003725567;
  ro5 = 3532.021;
  k5 = 78.91697;
  k6 = 0.0002176543;
  KmSpr = 75.58228;
  KmPi = 0.0006263897;
  KmEi = 20.03236;
  KmR = 35.28148;
  w3 = 0.5370883;
  w4 = 298.513;
  w5 = 733.4072;
  m5 = 3585.415;
  m6 = 0.001383288;
  ktRasSink = 3423.022;
  v4 = 1618.187;
  k7 = 3.005975e-6;
  k8 = 0.007922427;
  m7 = 1.805964e-8;
  m8 = 4.165974e-6;
  kppErkSink = 0.2005026;

  // Reactions:
  Ligand: -> L; Reg_T_CM_asp(v1, ro1, k1, k2, Precursor, ppErk, L, KmPre, KmE, KmL, w1, m1, m2);  // modifiers: ppErk
  EGFRp: -> Rp; Reg_T_CM_isp(v2, ro2, k3, k4, Mig6, L, Rp, KmMig, KmL, KmP, w2, m3, m4);  // modifiers: L
  LSink: L -> ; kLSink*L;
  RpSink: Rp -> ; kRpSink*Rp;
  Ras: -> tRas; Reg_T_CM_iiisp(v3, ro3, ro4, ro5, k5, k6, Spry2, Rp, ppErk, Rp, tRas, KmSpr, KmPi, KmEi, KmP, KmR, w3, w4, w5, m5, m6);  // modifiers: ppErk, Rp
  tRasSink: tRas -> ; ktRasSink*tRas;
  Erk: -> ppErk; T_CM_sp(v4, k7, k8, tRas, ppErk, KmR, KmE, m7, m8);  // modifiers: tRas
  ppErkSink: ppErk -> ; kppErkSink*ppErk;
end
