// SBML level 3 version 1

model EGF_erkp()
  // model units - substance: substance, time: time_unit

  // Compartments:
  compartment default_compartment = 1;
  compartment cell = 1;
  compartment extra = 5000;
  compartment intra = 1;

  // Species:
  species RE in cell = 0;
  species R in cell = Vr/kt;
  species REi in intra = 0;
  species E in extra = 82.5;
  species Ri in intra = 0;
  species Rd in cell = 0;
  species Rp in cell = 0;
  species Grb2 in cell = 37.11;
  species SOS in cell = 0.07;
  species SOSp in cell = 0;
  species GS in cell = 3.98;
  species Rp_GS in cell = 0;
  species Rp_GSi in intra = 0;
  species Shc in cell = 67.3;
  species Rp_Shc in cell = 0;
  species Rp_pShc in cell = 0;
  species pShc in cell = 0;
  species Rp_Shci in intra = 0;
  species Rp_pShci in intra = 0;
  species Rp_pShc_GS in cell = 0;
  species pShc_GS in cell = 0;
  species Rp_pShc_GSi in intra = 0;
  species RasGAP in cell = 25.2;
  species Rp_RasGAP in cell = 0;
  species IRp_RasGAP in cell = 0;
  species dRas in cell = 140;
  species tRas in cell = 0;
  species bRasGAP in cell = 0.002;
  species Raf in cell = 30;
  species Rafp in cell = 0;
  species aRaf in cell = 0;
  species aaRaf in cell = 0;
  species Mek in cell = 128.3;
  species ppMek in cell = 0;
  species Erk in cell = 150;
  species pErk in cell = 0;
  species ppErk in cell = 0;
  species SOS_ppErk in cell = 0;
  species Pro1433 in cell = 500;
  species SOSp_Pro1433 in cell = 0;
  species Raf_ppErk in cell = 0;
  species Rafp_Pro1433 in cell = 0;
  species Rdi in default_compartment = 0;
  species Rpi in default_compartment = 0;

  // Parameters:
  Vr = 0.242 nM_per_sec;
  kt = 0.0012 per_sec;
  k1 = 0.0016 per_nMs;
  k_1 = 0.004 per_sec;
  ke = 0.0033 per_sec;
  kx = 1 per_sec;
  kh = 0.0004 per_sec;
  k2 = 0.082 per_nMs;
  k_2 = 0.017 per_sec;
  k3 = 1.2 per_sec;
  k_3 = 1.3;
  k204 = 9.45e-6 per_nMs;
  k_204 = 0.0138 per_sec;
  k5 = 0.1 per_nMs;
  k_5 = 2 per_sec;
  k6 = 0.6 per_sec;
  k_7 = 2 per_sec;
  k7 = 0.144 per_nMs;
  V8 = 200 nM_per_s;
  Km8 = 100 nM;
  krec = 0.005 per_sec;
  k4 = 1.44 per_nMs;
  k_4 = 0.5 per_sec;
  k9 = 7.29 per_nMs;
  k_9 = 7.3 per_sec;
  k11 = 0.202 per_nMs;
  k_11 = 10.2 per_sec;
  k10 = 0.000547 per_nMs;
  k_10 = 2 per_sec;
  k13 = 8.26e-6 per_nMs;
  k_13 = 10 per_sec;
  kcat62 = 30.4 per_sec;
  Km62 = 50 nM;
  kcat63 = 49900 per_sec;
  Km63 = 50 nM;
  kcat65 = 1 per_sec;
  Km65 = 400 nM;
  kcat66 = 14 nM_per_s;
  Km66 = 10 nM;
  kcat67 = 100 nM_per_s;
  Km67 = 1000 nM;
  kcat68 = 0.754 per_sec;
  Km68 = 50 nM;
  V69 = 100 nM_per_s;
  Km69 = 675 nM;
  kcat70 = 0.0529 per_sec;
  Km70 = 300 nM;
  Km71 = 200 nM;
  kcat71 = 0.807 per_sec;
  V72 = 93.5 nM_per_s;
  Km72 = 5950 nM;
  Km73 = 500 nM;
  V73 = 17.1 nM_per_s;
  k205 = 0.00025 per_nMs;
  k_205 = 0.025 per_sec;
  kcat205 = 1 per_sec;
  kcat_205 = 0.1 per_sec;
  k206 = 0.001 per_nMs;
  k_206 = 0.001 per_sec;
  k60 = 0.001 per_nMs;
  k_60 = 0.025 per_sec;
  kcat60 = 0.5 per_sec;
  kcat_60 = 1 per_sec;
  k61 = 0.001 per_nMs;
  k_61 = 0.001 per_sec;

  // Reactions:
  New_Receptors: => R; Vr*cell;
  Receptor_turnover: R => Ri; R*kt*cell;
  Ligand_binding: E + R -> RE; (k1*R*E - k_1*RE)*cell;
  Receptor_ligand_endo: RE => REi; RE*ke*cell;
  Receptor_degrad: Ri => ; Ri*kx*cell;
  Receptor_complex_degrad: REi => ; REi*kh*cell;
  Receptor_dimerization: 2 RE => Rd; k2*RE*cell;
  Receptor_monomerization: Rd => 2 RE; k_2*Rd*cell;
  Dimer_endo: Rd => Rdi; Rd*kt*cell;
  Receptor_phospho: Rd -> Rp; (k3*Rd - k_3*Rp)*cell;
  Dimer_phospho_endo: Rp => Rpi; Rp*ke*cell;
  Grb2_Sos_formation: Grb2 + SOS -> GS; (Grb2*SOS*k204 - GS*k_204)*cell;
  Shc_receptor_bind: Rp + Shc -> Rp_Shc; (k5*Rp*Shc - k_5*Rp_Shc)*cell;
  Shc_phosphorylation: Rp_Shc => Rp_pShc; k6*Rp_Shc*cell;
  PhosphoShc_dissociation: Rp_pShc -> Rp + pShc; (k_7*Rp_pShc - k7*Rp*pShc)*cell;
  Phospho_Shc_dephosphorylation: pShc => Shc; V8*pShc/(Km8 + pShc)*cell;
  Shc_complex_endo: Rp_Shc => Rp_Shci; Rp_Shc*kt*cell;
  Phospho_Shc_complex_endo: Rp_pShc => Rp_pShci; Rp_pShc*kt*cell;
  Shc_complex_recycle: Rp_Shci => Shc; Rp_Shci*krec*intra;
  Phospho_Shc_complex_recycle: Rp_pShci => pShc; Rp_pShci*krec*intra;
  Receptor_GS_binding: Rp + GS -> Rp_GS; (Rp*GS*k4 - k_4*Rp_GS)*cell;
  Receptor_GS_endo: Rp_GS => Rp_GSi; Rp_GS*ke*cell;
  GS_endo_recycle: Rp_GSi => GS; Rp_GSi*krec*intra;
  Receptor_Shc_GS_formation: Rp_pShc + GS -> Rp_pShc_GS; (k9*Rp_pShc*GS - k_9*Rp_pShc_GS)*cell;
  pShc_GS_formation: pShc + GS -> pShc_GS; (k11*pShc*GS - k_11*pShc_GS)*cell;
  Receptor_Shc_GS_formation2: Rp + pShc_GS -> Rp_pShc_GS; (k10*Rp*pShc_GS - k_10*Rp_pShc_GS)*cell;
  Receptor_Shc_GS_endo: Rp_pShc_GS => Rp_pShc_GSi; ke*Rp_pShc_GS*cell;
  Shc_GS_recycle: Rp_pShc_GSi => Shc + GS; Rp_pShc_GSi*krec*intra;
  Receptor_RasGap_formation: Rp + RasGAP -> Rp_RasGAP; (k13*Rp*RasGAP - k_13*Rp_RasGAP)*cell;
  reaction_62: dRas => tRas; kcat62*dRas*(Rp_pShc_GS + Rp_GS)/(Km62 + dRas)*cell;  // modifiers: Rp_GS, Rp_pShc_GS
  reaction_63: tRas => dRas; kcat63*tRas*(bRasGAP + Rp_RasGAP)/(Km63 + tRas)*cell;  // modifiers: Rp_RasGAP, bRasGAP
  reaction_65: Raf => aRaf; kcat65*tRas*Raf/(Km65 + Raf)*cell;  // modifiers: tRas
  reaction_66: aRaf => aaRaf; kcat66*aRaf/(Km66 + aRaf)*cell;
  reaction_67: aaRaf => Raf; kcat67*aaRaf/(Km67 + aaRaf)*cell;
  reaction_68: Mek => ppMek; kcat68*aaRaf*Mek/(Km68 + Mek)*cell;  // modifiers: aaRaf
  reaction_69: ppMek => Mek; V69*ppMek/(Km69 + ppMek)*cell;
  reaction_70: Erk => pErk; kcat70*Erk*ppMek/(Km70 + Erk + pErk*(Km70/Km71))*cell;  // modifiers: ppMek
  reaction_71: pErk => ppErk; kcat71*pErk*ppMek/(Km71 + pErk + Erk*(Km71/Km70))*cell;  // modifiers: ppMek, Erk
  reaction_72: ppErk => pErk; V72*ppErk/(Km72 + ppErk + pErk*(Km72/Km73))*cell;
  reaction_73: pErk => Erk; V73*pErk/(Km73 + pErk + ppErk*(Km73/Km72))*cell;  // modifiers: ppErk
  Sos_Erk_binding: SOS + ppErk -> SOS_ppErk; (SOS*ppErk*k205 - SOS_ppErk*k_205)*cell;
  Sos_phosphorylation: SOS_ppErk => ppErk + SOSp; SOS_ppErk*kcat205*cell;
  Sos_dephosphorylation: SOSp => SOS; SOSp*kcat_205*cell;
  SOS_sequestration: SOSp + Pro1433 -> SOSp_Pro1433; (SOSp*Pro1433*k206 - SOSp_Pro1433*k_206)*cell;
  Raf_Erk_binding: Raf + ppErk -> Raf_ppErk; (k60*ppErk*Raf - Rafp*k_60)*cell;  // modifiers: Rafp
  Raf_phosphorylation: Raf_ppErk => ppErk + Rafp; Raf_ppErk*kcat60*cell;
  Raf_dephosphorylation: Rafp => Raf; Rafp*kcat_60*cell;
  Raf_sequestration: Rafp + Pro1433 -> Rafp_Pro1433; (Rafp*Pro1433*k61 - Rafp_Pro1433*k_61)*cell;

  // Unit definitions:
  unit nM = 1e-9 mole / litre;
  unit per_nMs = litre / (1e-9 mole * second);
  unit per_sec = 1 / second;
  unit nM_per_sec = 1;
  unit nM_per_s = 1e-9 mole / (litre * second);
  unit substance = 1e-9 mole;
  unit time_unit = second;
  unit per_nM = litre / (1e-9 mole);
end
