// SBML level 3 version 1

model receptor_module()
  // model units - substance: substance, time: time_unit

  // Compartments:
  compartment default_compartment = 1;
  compartment cell = 1;
  compartment extra = 5000;
  compartment intra = 1;

  // Species:
  species RE in cell = 0;
  species R in cell = Vr/kt;
  species REi in intra = 0;
  species E in extra = 5000;
  species Ri in intra = 0;
  species Rd in cell = 0;
  species Rp in cell = 0;
  species Rdi in default_compartment = 0;
  species Rpi in default_compartment = 0;

  // Parameters:
  Vr = 0.242 nM_per_sec;
  kt = 0.0012 per_sec;
  k1 = 0.0016 per_nMs;
  k_1 = 0.004 per_sec;
  ke = 0.0033 per_sec;
  kx = 1 per_sec;
  kh = 0.0004 per_sec;
  k2 = 0.082 per_nMs;
  k_2 = 0.017 per_sec;
  k3 = 1.2 per_sec;
  k_3 = 1.3 per_sec;

  // Reactions:
  New_Receptors: => R; Vr*cell;
  Receptor_turnover: R => Ri; R*kt*cell;
  Ligand_binding: E + R -> RE; (k1*R*E - k_1*RE)*cell;
  Receptor_ligand_endo: RE => REi; RE*ke*cell;
  Receptor_degrad: Ri => ; Ri*kx*cell;
  Receptor_complex_degrad: REi => ; REi*kh*cell;
  Receptor_dimerization: 2 RE => Rd; k2*RE*cell;
  Receptor_monomerization: Rd => 2 RE; k_2*Rd*cell;
  Dimer_endo: Rd => Rdi; Rd*kt*cell;
  Receptor_phospho: Rd -> Rp; (k3*Rd - k_3*Rp)*cell;
  Dimer_phospho_endo: Rp => Rpi; Rp*ke*cell;

  // Unit definitions:
  unit nM = 1e-9 mole / litre;
  unit per_nMs = litre / (1e-9 mole * second);
  unit per_sec = 1 / second;
  unit nM_per_sec = 1;
  unit substance = 1e-9 mole;
  unit time_unit = second;
  unit per_nM = litre / (1e-9 mole);
  unit nM_per_s = 1e-9 mole / (litre * second);
end
