// SBML level 3 version 2

function x(t)
  0.7407407 - 0.006903677*(t - 0) - 6.776264e-21*(t - 0)^2 + 1.585459e-7*(t - 0)^3;
end

function y(t)
  0.1862669 - 5.449256e-5*(t - 120) + 5.707654e-5*(t - 120)^2 - 1.881804e-7*(t - 120)^3;
end

function z(t)
  0.6764542 + 0.005514485*(t - 240) - 1.06684e-5*(t - 240)^2 + 5.272239e-9*(t - 240)^3;
end

function w(t)
  1.458314 + 0.001304698*(t - 480) - 6.872383e-6*(t - 480)^2 + 9.544976e-9*(t - 480)^3;
end

model EGFR_combined()
  // model units - substance: substance, time: time_unit

  // Compartments:
  compartment default_compartment = 1;
  compartment cell = 1;
  compartment extra = 5000; extra is "extracellular space";
  compartment intra = 1;

  // Species:
  species Lig in extra = 825/extra;
  species Egfr in cell = 135/cell;
  species iEgfr in intra = 73/intra;
  species Egfr_Lig in cell = 0.12/cell;
  species iEgfr_Lig in intra = 0.06/intra;
  species pEgfr_Lig in cell = 0.8/cell;
  species ipEgfr_Lig in intra = 0.4/intra;
  species aRtot in cell;
  species Garem in cell = 1/cell;
  species Grb2 in cell = 37.11/cell;
  species Shp2 in cell = 28.5/cell;
  species Grb2_Garem in cell = 3/cell;
  species aR_Grb2_ppGarem_Shp2 in cell = 0.22/cell;
  species aR_Grb2_ppGarem_pShp2 in cell = 0;
  species aR_Grb2_Garem in cell = 0.1/cell;
  species aR_Grb2_pGarem in cell = 0.1/cell;
  species aR_Grb2_ppGarem in cell = 0.1/cell;
  species Shc1 in cell = 28/cell;
  species aR_Shc1 in cell = 0;
  species aR_pShc1 in cell = 0;
  species Gab1 in cell = 1/cell;
  species Grb2_Gab1 in cell = 4/cell;
  species aR_Grb2_Gab1 in cell = 0.1/cell;
  species aR_Grb2_pGab1 in cell = 0;
  species aR_Grb2_ppGab1 in cell = 0;
  species aR_Grb2_ppGab1_Shp2 in cell = 0;
  species aR_Grb2_ppGab1_pShp2 in cell = 0;
  species SOS1 in cell = 0.07/cell;
  species Grb2_SOS1 in cell = 3.98/cell;
  species pSOS1 in cell = 0.01/cell;
  species Ad1_Grb2_SOS1 in cell = 0.5/cell;
  species iAd1_Grb2_SOS1 in cell = 0.2/cell;
  species iaR_Grb2_ppGarem_pShp2 in cell = 0.05/cell;
  species Ad2_Grb2_SOS1 in cell = 0.5/cell;
  species iAd2_Grb2_SOS1 in cell = 0.2/cell;
  species iaR_Grb2_ppGab1_pShp2 in cell = 0.05/cell;
  species Ad3_Grb2_SOS1 in cell = 0.5/cell;
  species iAd3_Grb2_SOS1 in cell = 0.2/cell;
  species iaR_pShc1 in cell = 0.5/cell;
  species Ras in cell = 98/cell;
  species aRas in cell = 1.43/cell;
  species Rasa1 in cell = 98/cell;
  species $aRSK in default_compartment;

  // Parameters:
  Vr = 0.242;
  kt = 0.0012;
  kx = 1;
  kf = 0.008906799;
  kr = 0.0007370764;
  ke = 0.0037;
  kh = 0.0004;
  kp = 0.1914236;
  k_p = 0.13;
  k1 = 0.0001;
  k_1 = 0.000138;
  k2 = 0.04321217;
  k_2 = 0.09215807;
  k3 = 0.3024102;
  k_3 = 0.9991385;
  k4 = 0.8546156;
  k_4 = 1.323315e-5;
  k5 = 0.067;
  k_5 = 0.13;
  k7 = 0.0001;
  k_7 = 0.000138;
  k8 = 0.0125022;
  k_8 = 1.093754e-5;
  k6 = 0.1959966;
  k_6 = 0.6183627;
  k9 = 9.45e-5;
  k_9 = 0.000138;
  k11 = 0.0001367877;
  k12 = 0.02892716;
  k10a = 4.772785e-5;
  k_10a = 5.548843;
  kr1a = 0.005726864;
  kr2a = 0.2979935;
  k10b = 8.860131e-5;
  k_10b = 0.3063896;
  kr1b = 0.0002863383;
  kr2b = 2.416488e-5;
  k10c = 0.02823732;
  k_10c = 6.850561;
  kr1c = 9.868863;
  kr2c = 0.0009423945;
  k13a = 0.004438395;
  k13b = 0.0001753866;
  k13c = 0.06732936;
  k14 = 0.0001635093;

  // Assignment rules:
  aRtot := pEgfr_Lig + ipEgfr_Lig;
  aRSK := RSK_RAS_ratio*aRas;
  RSK_RAS_ratio := piecewise(x(time), time <= 120, y(time), time <= 240, z(time), time <= 480, w(time), time <= 720);
  total_SOS := SOS1 + Grb2_SOS1 + pSOS1;

  // Reactions:
  J1: => Egfr; Vr;
  J2: Egfr => iEgfr; kt*Egfr;
  J3: iEgfr => ; kx*iEgfr;
  J4: Egfr -> Egfr_Lig; kf*Egfr*Lig - kr*Egfr_Lig;  // modifiers: Lig
  J5: Egfr_Lig => iEgfr_Lig; ke*Egfr_Lig;
  J6: iEgfr_Lig => ; kh*iEgfr_Lig;
  J7: Egfr_Lig -> pEgfr_Lig; kp*Egfr_Lig - k_p*pEgfr_Lig;
  J8: pEgfr_Lig => ipEgfr_Lig; ke*pEgfr_Lig;
  J9: ipEgfr_Lig => ; kh*ipEgfr_Lig;
  J10: Garem + Grb2 -> Grb2_Garem; k1*Garem*Grb2 - k_1*Grb2_Garem;
  J11: pEgfr_Lig + Grb2_Garem -> aR_Grb2_Garem; k2*pEgfr_Lig*Grb2_Garem - k_2*aR_Grb2_Garem;
  J13: aR_Grb2_Garem -> aR_Grb2_pGarem; k3*aR_Grb2_Garem - k_3*aR_Grb2_pGarem;
  J14: aR_Grb2_pGarem -> aR_Grb2_ppGarem; k3*aR_Grb2_pGarem - k_3*aR_Grb2_ppGarem;
  J15: aR_Grb2_ppGarem + Shp2 -> aR_Grb2_ppGarem_Shp2; k4*aR_Grb2_ppGarem*Shp2 - k_4*aR_Grb2_ppGarem_Shp2;
  J16: aR_Grb2_ppGarem_Shp2 -> aR_Grb2_ppGarem_pShp2; k5*aR_Grb2_ppGarem_Shp2 - k_5*aR_Grb2_ppGarem_pShp2;
  J17: Gab1 + Grb2 -> Grb2_Gab1; k7*Gab1*Grb2 - k_7*Grb2_Gab1;
  J18: pEgfr_Lig + Grb2_Gab1 -> aR_Grb2_Gab1; k8*pEgfr_Lig*Grb2_Gab1 - k_8*aR_Grb2_Gab1;
  J19: aR_Grb2_Gab1 -> aR_Grb2_pGab1; k3*aR_Grb2_Gab1 - k_3*aR_Grb2_pGab1;
  J20: aR_Grb2_pGab1 -> aR_Grb2_ppGab1; k3*aR_Grb2_pGab1 - k_3*aR_Grb2_ppGab1;
  J21: aR_Grb2_ppGab1 + Shp2 -> aR_Grb2_ppGab1_Shp2; k8*aR_Grb2_ppGab1*Shp2 - k_8*aR_Grb2_ppGab1_Shp2;
  J22: aR_Grb2_ppGab1_Shp2 -> aR_Grb2_ppGab1_pShp2; k5*aR_Grb2_ppGab1_Shp2 - k_5*aR_Grb2_ppGab1_pShp2;
  J23: pEgfr_Lig + Shc1 -> aR_Shc1; k6*pEgfr_Lig*Shc1 - k_6*aR_Shc1;
  J24: aR_Shc1 -> aR_pShc1; k3*aR_Shc1 - k_3*aR_pShc1;
  J25: Grb2 + SOS1 -> Grb2_SOS1; k9*Grb2*SOS1 - k_9*Grb2_SOS1;
  J26: $aRSK + Grb2_SOS1 -> $aRSK + Grb2 + pSOS1; k11*aRSK*Grb2_SOS1;
  J27: pSOS1 -> SOS1; k12*pSOS1;
  J28: aR_Grb2_ppGarem_pShp2 + Grb2_SOS1 -> Ad1_Grb2_SOS1; k10a*aR_Grb2_ppGarem_pShp2*Grb2_SOS1 - k_10a*Ad1_Grb2_SOS1;
  J29: Ad1_Grb2_SOS1 => iAd1_Grb2_SOS1; ke*Ad1_Grb2_SOS1;
  J30: iAd1_Grb2_SOS1 => Grb2_SOS1 + iaR_Grb2_ppGarem_pShp2; kr1a*iAd1_Grb2_SOS1;
  J31: iaR_Grb2_ppGarem_pShp2 => ipEgfr_Lig + Grb2_Garem + Shp2; kr2a*iaR_Grb2_ppGarem_pShp2;
  J32: aR_Grb2_ppGab1_pShp2 + Grb2_SOS1 -> Ad2_Grb2_SOS1; k10b*aR_Grb2_ppGab1_pShp2*Grb2_SOS1 - k_10b*Ad2_Grb2_SOS1;
  J33: Ad2_Grb2_SOS1 => iAd2_Grb2_SOS1; ke*Ad2_Grb2_SOS1;
  J34: iAd2_Grb2_SOS1 => Grb2_SOS1 + iaR_Grb2_ppGab1_pShp2; kr1b*iAd2_Grb2_SOS1;
  J35: iaR_Grb2_ppGab1_pShp2 => ipEgfr_Lig + Grb2_Gab1 + Shp2; kr2b*iaR_Grb2_ppGab1_pShp2;
  J36: aR_pShc1 + Grb2_SOS1 -> Ad3_Grb2_SOS1; k10c*aR_pShc1*Grb2_SOS1 - k_10c*Ad3_Grb2_SOS1;
  J37: Ad3_Grb2_SOS1 => iAd3_Grb2_SOS1; ke*Ad3_Grb2_SOS1;
  J38: iAd3_Grb2_SOS1 => Grb2_SOS1 + iaR_pShc1; kr1c*iAd3_Grb2_SOS1;
  J39: iaR_pShc1 => ipEgfr_Lig + Shc1; kr2c*iaR_pShc1;
  J40: Ad1_Grb2_SOS1 + Ras => Ad1_Grb2_SOS1 + aRas; k13a*Ad1_Grb2_SOS1*Ras;
  J41: Ad2_Grb2_SOS1 + Ras => Ad2_Grb2_SOS1 + aRas; k13b*Ad2_Grb2_SOS1*Ras;
  J42: Ad3_Grb2_SOS1 + Ras => Ad3_Grb2_SOS1 + aRas; k13c*Ad3_Grb2_SOS1*Ras;
  J43: aRas + Rasa1 => Ras + Rasa1; k14*aRas*Rasa1;

  // Unit definitions:
  unit nM = 1e-9 mole / litre;
  unit substance = 1e-9 mole; substance is "nmole";
  unit time_unit = second; time_unit is "s";
  unit per_nM = litre / (1e-9 mole);
  unit per_sec = 1 / second; per_sec is "s-1";
  unit nM_per_s = 1e-9 mole / (litre * second); nM_per_s is "nM/s";
  unit per_nMs = litre / (1e-9 mole * second); per_nMs is "nM-1 s-1";
end
