// SBML level 3 version 2

model EGFR_combined()
  // model units - substance: substance, time: time_unit

  // Compartments:
  compartment default_compartment = 1;
  compartment cell = 1;
  compartment extra = 5000; extra is "extracellular space";
  compartment intra = 1;

  // Species:
  species Lig in extra = 825/extra;
  species Egfr in cell = 135/cell;
  species iEgfr in intra = 73/intra;
  species Egfr_Lig in cell = 0.12/cell;
  species iEgfr_Lig in intra = 0.06/intra;
  species pEgfr_Lig in cell = 0.8/cell;
  species ipEgfr_Lig in intra = 0.4/intra;
  species aRtot in cell;
  species pGAREMtot in cell;
  species pGAB1tot in cell;
  species pSHC1tot in cell;
  species Garem in default_compartment = 1/default_compartment;
  species Grb2 in default_compartment = 37.11/default_compartment;
  species Grb2_Garem in default_compartment = 3/default_compartment;
  species aR_Grb2_Garem in default_compartment = 0.1/default_compartment;
  species aR_Grb2_pGarem in default_compartment = 0.1/default_compartment;
  species Grb2_pGarem in default_compartment = 0;
  species aR_Grb2_ppGarem in default_compartment = 0.1/default_compartment;
  species Grb2_ppGarem in default_compartment = 0;
  species Shp2 in default_compartment = 28.5/default_compartment;
  species aR_Grb2_ppGarem_Shp2 in default_compartment = 0.22/default_compartment;
  species aR_Grb2_ppGarem_pShp2 in default_compartment = 0;
  species pShp2 in default_compartment = 0;
  species Gab1 in default_compartment = 1/default_compartment;
  species Grb2_Gab1 in default_compartment = 4/default_compartment;
  species aR_Grb2_Gab1 in default_compartment = 0.1/default_compartment;
  species aR_Grb2_pGab1 in default_compartment = 0;
  species Grb2_pGab1 in default_compartment = 0;
  species aR_Grb2_ppGab1 in default_compartment = 0;
  species Grb2_ppGab1 in default_compartment = 0;
  species aR_Grb2_ppGab1_Shp2 in default_compartment = 0;
  species aR_Grb2_ppGab1_pShp2 in default_compartment = 0;
  species Shc1 in default_compartment = 28/default_compartment;
  species aR_Shc1 in default_compartment = 0;
  species aR_pShc1 in default_compartment = 0;
  species pShc1 in default_compartment = 0;

  // Parameters:
  Vr = 0.242;
  kt = 0.0012;
  kx = 1;
  kf = 0.016;
  kr = 0.0069;
  ke = 0.0037;
  kh = 0.0004;
  kp = 0.009973329;
  k_p = 0.046;
  k1 = 0.05;
  k_1 = 0.06599657;
  k2 = 0.05;
  k_2 = 0.08520006;
  k3 = 0.05;
  k_3 = 0.007454999;
  k4 = 0.05;
  k_4 = 0.007747269;
  k5 = 0.05;
  k_5 = 0.06371083;
  k6 = 0.05;
  k_6 = 0.007401273;
  k_7 = 0.009598501;

  // Assignment rules:
  aRtot := pEgfr_Lig + ipEgfr_Lig;
  pGAREMtot := aR_Grb2_pGarem + aR_Grb2_ppGarem + Grb2_pGarem + Grb2_ppGarem + aR_Grb2_ppGarem_Shp2 + aR_Grb2_ppGarem_pShp2;
  pGAB1tot := aR_Grb2_pGab1 + aR_Grb2_ppGab1 + Grb2_pGab1 + Grb2_ppGab1 + aR_Grb2_ppGab1_Shp2 + aR_Grb2_ppGab1_pShp2;
  pSHC1tot := aR_pShc1 + pShc1;

  // Reactions:
  J1: => Egfr; Vr;
  J2: Egfr => iEgfr; kt*Egfr;
  J3: iEgfr => ; kx*iEgfr;
  J4: Egfr -> Egfr_Lig; kf*Egfr*Lig - kr*Egfr_Lig;  // modifiers: Lig
  J5: Egfr_Lig => iEgfr_Lig; ke*Egfr_Lig;
  J6: iEgfr_Lig => ; kh*iEgfr_Lig;
  J7: Egfr_Lig -> pEgfr_Lig; kp*Egfr_Lig - k_p*pEgfr_Lig;
  J8: pEgfr_Lig => ipEgfr_Lig; ke*pEgfr_Lig;
  J9: ipEgfr_Lig => ; kh*ipEgfr_Lig;
  J10: Garem + Grb2 -> Grb2_Garem; k1*Garem*Grb2 - k_1*Grb2_Garem;
  J11: pEgfr_Lig + Grb2_Garem -> aR_Grb2_Garem; k2*pEgfr_Lig*Grb2_Garem - k_2*aR_Grb2_Garem;
  J12: aR_Grb2_Garem => aR_Grb2_pGarem; kp*aR_Grb2_Garem;
  J13: aR_Grb2_pGarem => pEgfr_Lig + Grb2_pGarem; k_2*aR_Grb2_pGarem;
  J14: Grb2_pGarem => Grb2_Garem; k_p*Grb2_pGarem;
  J15: aR_Grb2_pGarem => aR_Grb2_ppGarem; kp*aR_Grb2_pGarem;
  J16: aR_Grb2_ppGarem => pEgfr_Lig + Grb2_ppGarem; k_2*aR_Grb2_ppGarem;
  J17: Grb2_ppGarem => Grb2_pGarem; k_p*Grb2_ppGarem;
  J18: aR_Grb2_ppGarem + Shp2 -> aR_Grb2_ppGarem_Shp2; k3*aR_Grb2_ppGarem*Shp2 - k_3*aR_Grb2_ppGarem_Shp2;
  J19: aR_Grb2_ppGarem_Shp2 => aR_Grb2_ppGarem_pShp2; kp*aR_Grb2_ppGarem_Shp2;
  J20: aR_Grb2_ppGarem_pShp2 => aR_Grb2_ppGarem + pShp2; k_3*aR_Grb2_ppGarem_pShp2;
  J21: pShp2 => Shp2; k_p*pShp2;
  J22: Gab1 + Grb2 -> Grb2_Gab1; k4*Gab1*Grb2 - k_4*Grb2_Gab1;
  J23: pEgfr_Lig + Grb2_Gab1 -> aR_Grb2_Gab1; k5*pEgfr_Lig*Grb2_Gab1 - k_5*aR_Grb2_Gab1;
  J24: aR_Grb2_Gab1 => aR_Grb2_pGab1; kp*aR_Grb2_Gab1;
  J25: aR_Grb2_pGab1 => pEgfr_Lig + Grb2_pGab1; k_5*aR_Grb2_pGarem;  // modifiers: aR_Grb2_pGarem
  J26: Grb2_pGab1 => Grb2_Gab1; k_p*Grb2_pGarem;  // modifiers: Grb2_pGarem
  J27: aR_Grb2_pGab1 => aR_Grb2_ppGab1; kp*aR_Grb2_pGab1;
  J28: aR_Grb2_ppGab1 => pEgfr_Lig + Grb2_ppGab1; k_5*aR_Grb2_ppGarem;  // modifiers: aR_Grb2_ppGarem
  J29: Grb2_ppGab1 => Grb2_pGab1; k_p*Grb2_ppGarem;  // modifiers: Grb2_ppGarem
  J30: aR_Grb2_ppGab1 + Shp2 -> aR_Grb2_ppGab1_Shp2; k3*aR_Grb2_ppGab1*Shp2 - k_3*aR_Grb2_ppGab1_Shp2;
  J31: aR_Grb2_ppGab1_Shp2 => aR_Grb2_ppGab1_pShp2; kp*aR_Grb2_ppGab1_Shp2;
  J32: aR_Grb2_ppGab1_pShp2 => aR_Grb2_ppGab1 + pShp2; k_3*aR_Grb2_ppGarem_pShp2;  // modifiers: aR_Grb2_ppGarem_pShp2
  J33: pEgfr_Lig + Shc1 -> aR_Shc1; k6*pEgfr_Lig*Shc1 - k_6*aR_Shc1;
  J34: aR_Shc1 => aR_pShc1; kp*aR_Shc1;
  J35: aR_pShc1 => pEgfr_Lig + pShc1; k_7*aR_Shc1;  // modifiers: aR_Shc1
  J36: pShc1 => Shc1; k_p*pShc1;

  // Unit definitions:
  unit nM = 1e-9 mole / litre;
  unit substance = 1e-9 mole; substance is "nmole";
  unit time_unit = second; time_unit is "s";
  unit per_nM = litre / (1e-9 mole);
  unit per_sec = 1 / second; per_sec is "s-1";
  unit nM_per_s = 1e-9 mole / (litre * second); nM_per_s is "nM/s";
  unit per_nMs = litre / (1e-9 mole * second); per_nMs is "nM-1 s-1";
end
