// SBML level 3 version 2

function x(t)
  0.7407407 - 0.006903677*(t - 0) - 6.776264e-21*(t - 0)^2 + 1.585459e-7*(t - 0)^3;
end

function y(t)
  0.1862669 - 5.449256e-5*(t - 120) + 5.707654e-5*(t - 120)^2 - 1.881804e-7*(t - 120)^3;
end

function z(t)
  0.6764542 + 0.005514485*(t - 240) - 1.06684e-5*(t - 240)^2 + 5.272239e-9*(t - 240)^3;
end

function w(t)
  1.458314 + 0.001304698*(t - 480) - 6.872383e-6*(t - 480)^2 + 9.544976e-9*(t - 480)^3;
end

model EGFR_combined()
  // model units - substance: substance, time: time_unit

  // Compartments:
  compartment default_compartment = 1;
  compartment cell = 1;
  compartment extra = 5000; extra is "extracellular space";
  compartment intra = 1;

  // Species:
  species Lig in extra = 0;
  species Egfr in cell = 135/cell;
  species iEgfr in intra = 73/intra;
  species Egfr_Lig in cell = 0.12/cell;
  species iEgfr_Lig in intra = 0.06/intra;
  species pEgfr_Lig in cell = 0.8/cell;
  species ipEgfr_Lig in intra = 0.4/intra;
  species aRtot in cell;
  species Garem in cell = 1/cell;
  species Grb2 in cell = 37.11/cell;
  species Shp2 in cell = 28.5/cell;
  species Grb2_Garem in cell = 3/cell;
  species aR_Grb2_ppGarem_Shp2 in cell = 0.22/cell;
  species aR_Grb2_ppGarem_pShp2 in cell = 0;
  species aR_Grb2_Garem in cell = 0.1/cell;
  species aR_Grb2_pGarem in cell = 0.1/cell;
  species aR_Grb2_ppGarem in cell = 0.1/cell;
  species Shc1 in cell = 28/cell;
  species aR_Shc1 in cell = 0;
  species aR_pShc1 in cell = 0;
  species Gab1 in cell = 1/cell;
  species Grb2_Gab1 in cell = 4/cell;
  species aR_Grb2_Gab1 in cell = 0.1/cell;
  species aR_Grb2_pGab1 in cell = 0;
  species aR_Grb2_ppGab1 in cell = 0;
  species aR_Grb2_ppGab1_Shp2 in cell = 0;
  species aR_Grb2_ppGab1_pShp2 in cell = 0;
  species SOS1 in cell = 0.07/cell;
  species Grb2_SOS1 in cell = 3.98/cell;
  species pSOS1 in cell = 0.01/cell;
  species Ad1_Grb2_SOS1 in cell = 0.5/cell;
  species iAd1_Grb2_SOS1 in cell = 0.2/cell;
  species iaR_Grb2_ppGarem_pShp2 in cell = 0.05/cell;
  species Ad2_Grb2_SOS1 in cell = 0.5/cell;
  species iAd2_Grb2_SOS1 in cell = 0.2/cell;
  species iaR_Grb2_ppGab1_pShp2 in cell = 0.05/cell;
  species Ad3_Grb2_SOS1 in cell = 0.1/cell;
  species iAd3_Grb2_SOS1 in cell = 0.05/cell;
  species iaR_pShc1 in cell = 0.1/cell;
  species Ras in cell = 98/cell;
  species aRas1 in cell = 0.5/cell;
  species aRas2 in cell = 0.5/cell;
  species aRas3 in cell = 0.43/cell;
  species Rasa1 in cell = 98/cell;
  species pEGFRtot in cell;
  species pGAREMtot in cell;
  species pGAB1tot in cell;
  species pSHC1tot in cell;
  species aRAStot in cell;
  species $aRSK in default_compartment;
  species Grb2_pGarem in default_compartment = 0;
  species Grb2_ppGarem in default_compartment = 0;
  species pShp2 in default_compartment = 0;
  species Grb2_pGab1 in default_compartment = 0;
  species Grb2_ppGab1 in default_compartment = 0;
  species pShc1 in default_compartment = 0;

  // Parameters:
  Vr = 0.242;
  kt = 0.0012;
  kx = 1;
  kf = 0.0159;
  kr = 0.00685;
  ke = 0.0037;
  kh = 0.0004;
  kp1 = 0.0076;
  k_p1 = 0.03;
  k1 = 0.0003142947;
  k_1 = 1.256825;
  k2 = 0.03435684;
  k_2 = 0.01557191;
  kp2 = 1.194326;
  k_2a = 13.69738;
  k_p2 = 0.02654302;
  kp2a = 0.917134;
  k_2b = 2.607431;
  k_p2a = 2.957887;
  k3 = 0.002788435;
  k_3 = 0.265954;
  kp2b = 0.0005233932;
  k_3a = 0.0001275858;
  k_p2b = 0.5470545;
  k4 = 0.002227175;
  k_4 = 2.842432;
  k5 = 0.4448602;
  k_5 = 17.04398;
  kp3 = 0.1089094;
  k_5a = 2.383689;
  k_p3 = 0.007673852;
  kp3a = 0.0002512089;
  k_5b = 1.903729;
  k_p3a = 0.7681265;
  k3a = 0.00736865;
  k_3b = 0.4767893;
  kp3b = 0.00115343;
  k_3c = 0.5155975;
  k6 = 0.001161229;
  k_6 = 0.004178791;
  kp4 = 1.468505;
  k_6a = 1.436362;
  k_p4 = 2.725792;
  k8 = 0.0005021504;
  k_8 = 0.001969772;
  k9 = 0.002832012;
  k10 = 0.08571407;
  k11 = 4.434051;
  k_11 = 0.0005226752;
  ke1 = 0.3307492;
  kr1a = 0.000162459;
  kr2a = 0.0001920418;
  k12 = 0.01946993;
  k_12 = 0.001331086;
  ke2 = 0.3199308;
  kr1b = 0.01759959;
  kr2b = 0.0002096186;
  k13 = 9.139524;
  k_13 = 0.7037765;
  ke3 = 0.01456585;
  kr1c = 0.003724325;
  kr2c = 0.0002393719;
  k14a = 0.006933597;
  k14b = 3.906421;
  k14c = 14.68575;
  k15 = 0.2748621;
  k_7 = 16.22128;

  // Assignment rules:
  aRtot := pEgfr_Lig + ipEgfr_Lig;
  pEGFRtot := pEgfr_Lig + ipEgfr_Lig + aR_Grb2_Garem + aR_Grb2_pGarem + aR_Grb2_ppGarem + aR_Grb2_ppGarem_Shp2 + aR_Grb2_ppGarem_pShp2 + aR_Grb2_Gab1 + aR_Grb2_pGab1 + aR_Grb2_ppGab1 + aR_Grb2_ppGab1_Shp2 + aR_Grb2_ppGab1_pShp2 + aR_Shc1 + aR_pShc1 + Ad1_Grb2_SOS1 + iAd1_Grb2_SOS1 + Ad2_Grb2_SOS1 + iAd2_Grb2_SOS1 + Ad3_Grb2_SOS1 + iAd3_Grb2_SOS1;
  pGAREMtot := aR_Grb2_pGarem + aR_Grb2_ppGarem + Grb2_pGarem + Grb2_ppGarem + aR_Grb2_ppGarem_Shp2 + aR_Grb2_ppGarem_pShp2 + Ad1_Grb2_SOS1 + iAd1_Grb2_SOS1 + iaR_Grb2_ppGarem_pShp2;
  pGAB1tot := aR_Grb2_pGab1 + aR_Grb2_ppGab1 + Grb2_pGab1 + Grb2_ppGab1 + aR_Grb2_ppGab1_Shp2 + aR_Grb2_ppGab1_pShp2 + Ad2_Grb2_SOS1 + iAd2_Grb2_SOS1 + iaR_Grb2_ppGab1_pShp2;
  pSHC1tot := aR_pShc1 + pShc1 + Ad3_Grb2_SOS1 + iAd3_Grb2_SOS1 + iaR_pShc1;
  aRAStot := aRas1 + aRas2 + aRas3;
  aRSK := RSK_RAS_ratio*aRAStot;
  RSK_RAS_ratio := piecewise(x(time), time <= 120, y(time), time <= 240, z(time), time <= 480, w(time), time <= 720);
  total_SOS := SOS1 + Grb2_SOS1 + pSOS1;

  // Reactions:
  J1: => Egfr; Vr;
  J2: Egfr => iEgfr; kt*Egfr;
  J3: iEgfr => ; kx*iEgfr;
  J4: Egfr -> Egfr_Lig; kf*Egfr*Lig - kr*Egfr_Lig;  // modifiers: Lig
  J5: Egfr_Lig => iEgfr_Lig; ke*Egfr_Lig;
  J6: iEgfr_Lig => ; kh*iEgfr_Lig;
  J7: Egfr_Lig -> pEgfr_Lig; kp1*Egfr_Lig - k_p1*pEgfr_Lig;
  J8: pEgfr_Lig => ipEgfr_Lig; ke*pEgfr_Lig;
  J9: ipEgfr_Lig => ; kh*ipEgfr_Lig;
  J10: Garem + Grb2 -> Grb2_Garem; k1*Garem*Grb2 - k_1*Grb2_Garem;
  J11: pEgfr_Lig + Grb2_Garem -> aR_Grb2_Garem; k2*pEgfr_Lig*Grb2_Garem - k_2*aR_Grb2_Garem;
  J12: aR_Grb2_Garem => aR_Grb2_pGarem; kp2*aR_Grb2_Garem;
  J13: aR_Grb2_pGarem => pEgfr_Lig + Grb2_pGarem; k_2a*aR_Grb2_pGarem;
  J14: Grb2_pGarem => Grb2_Garem; k_p2*Grb2_pGarem;
  J15: aR_Grb2_pGarem => aR_Grb2_ppGarem; kp2a*aR_Grb2_pGarem;
  J16: aR_Grb2_ppGarem => pEgfr_Lig + Grb2_ppGarem; k_2b*aR_Grb2_ppGarem;
  J17: Grb2_ppGarem => Grb2_pGarem; k_p2a*Grb2_ppGarem;
  J18: aR_Grb2_ppGarem + Shp2 -> aR_Grb2_ppGarem_Shp2; k3*aR_Grb2_ppGarem*Shp2 - k_3*aR_Grb2_ppGarem_Shp2;
  J19: aR_Grb2_ppGarem_Shp2 => aR_Grb2_ppGarem_pShp2; kp2b*aR_Grb2_ppGarem_Shp2;
  J20: aR_Grb2_ppGarem_pShp2 => aR_Grb2_ppGarem + pShp2; k_3a*aR_Grb2_ppGarem_pShp2;
  J21: pShp2 => Shp2; k_p2b*pShp2;
  J22: Gab1 + Grb2 -> Grb2_Gab1; k4*Gab1*Grb2 - k_4*Grb2_Gab1;
  J23: pEgfr_Lig + Grb2_Gab1 -> aR_Grb2_Gab1; k5*pEgfr_Lig*Grb2_Gab1 - k_5*aR_Grb2_Gab1;
  J24: aR_Grb2_Gab1 => aR_Grb2_pGab1; kp3*aR_Grb2_Gab1;
  J25: aR_Grb2_pGab1 => pEgfr_Lig + Grb2_pGab1; k_5a*aR_Grb2_pGab1;
  J26: Grb2_pGab1 => Grb2_Gab1; k_p3*Grb2_pGab1;
  J27: aR_Grb2_pGab1 => aR_Grb2_ppGab1; kp3a*aR_Grb2_pGab1;
  J28: aR_Grb2_ppGab1 => pEgfr_Lig + Grb2_ppGab1; k_5b*aR_Grb2_ppGab1;
  J29: Grb2_ppGab1 => Grb2_pGab1; k_p3a*Grb2_ppGab1;
  J30: aR_Grb2_ppGab1 + Shp2 -> aR_Grb2_ppGab1_Shp2; k3a*aR_Grb2_ppGab1*Shp2 - k_3b*aR_Grb2_ppGab1_Shp2;
  J31: aR_Grb2_ppGab1_Shp2 => aR_Grb2_ppGab1_pShp2; kp3b*aR_Grb2_ppGab1_Shp2;
  J32: aR_Grb2_ppGab1_pShp2 => aR_Grb2_ppGab1 + pShp2; k_3c*aR_Grb2_ppGab1_pShp2;
  J33: pEgfr_Lig + Shc1 -> aR_Shc1; k6*pEgfr_Lig*Shc1 - k_6*aR_Shc1;
  J34: aR_Shc1 => aR_pShc1; kp4*aR_Shc1;
  J35: aR_pShc1 => pEgfr_Lig + pShc1; k_6a*aR_pShc1;
  J36: pShc1 => Shc1; k_p4*pShc1;
  J37: Grb2 + SOS1 -> Grb2_SOS1; k8*Grb2*SOS1 - k_8*Grb2_SOS1;
  J38: $aRSK + Grb2_SOS1 => Grb2 + pSOS1 + $aRSK; k9*aRSK*Grb2_SOS1;
  J39: pSOS1 => SOS1; k10*pSOS1;
  J40: aR_Grb2_ppGarem_pShp2 + Grb2_SOS1 -> Ad1_Grb2_SOS1; k11*aR_Grb2_ppGarem_pShp2*Grb2_SOS1 - k_11*Ad1_Grb2_SOS1;
  J41: Ad1_Grb2_SOS1 => iAd1_Grb2_SOS1; ke1*Ad1_Grb2_SOS1;
  J42: iAd1_Grb2_SOS1 => Grb2_SOS1 + iaR_Grb2_ppGarem_pShp2; kr1a*iAd1_Grb2_SOS1;
  J43: iaR_Grb2_ppGarem_pShp2 => ipEgfr_Lig + Grb2_Garem + Shp2; kr2a*iaR_Grb2_ppGarem_pShp2;
  J44: aR_Grb2_ppGab1_pShp2 + Grb2_SOS1 -> Ad2_Grb2_SOS1; k12*aR_Grb2_ppGab1_pShp2*Grb2_SOS1 - k_12*Ad2_Grb2_SOS1;
  J45: Ad2_Grb2_SOS1 => iAd2_Grb2_SOS1; ke2*Ad2_Grb2_SOS1;
  J46: iAd2_Grb2_SOS1 => Grb2_SOS1 + iaR_Grb2_ppGab1_pShp2; kr1b*iAd2_Grb2_SOS1;
  J47: iaR_Grb2_ppGab1_pShp2 => ipEgfr_Lig + Grb2_Gab1 + Shp2; kr2b*iaR_Grb2_ppGab1_pShp2;
  J48: aR_pShc1 + Grb2_SOS1 -> Ad3_Grb2_SOS1; k13*aR_pShc1*Grb2_SOS1 - k_13*Ad3_Grb2_SOS1;
  J49: Ad3_Grb2_SOS1 => iAd3_Grb2_SOS1; ke3*Ad3_Grb2_SOS1;
  J50: iAd3_Grb2_SOS1 => Grb2_SOS1 + iaR_pShc1; kr1c*iAd3_Grb2_SOS1;
  J51: iaR_pShc1 => ipEgfr_Lig + Shc1; kr2c*iaR_pShc1;
  J52: Ad1_Grb2_SOS1 + Ras => Ad1_Grb2_SOS1 + aRas1; k14a*Ad1_Grb2_SOS1*Ras;
  J53: Ad2_Grb2_SOS1 + Ras => Ad2_Grb2_SOS1 + aRas2; k14b*Ad2_Grb2_SOS1*Ras;
  J54: Ad3_Grb2_SOS1 + Ras => Ad3_Grb2_SOS1 + aRas3; k14c*Ad3_Grb2_SOS1*Ras;
  J55: aRas1 + Rasa1 => Ras + Rasa1; k15*aRas1*Rasa1;
  J56: aRas2 + Rasa1 => Ras + Rasa1; k15*aRas2*Rasa1;
  J57: aRas3 + Rasa1 => Ras + Rasa1; k15*aRas3*Rasa1;

  // Unit definitions:
  unit nM = 1e-9 mole / litre;
  unit substance = 1e-9 mole; substance is "nmole";
  unit time_unit = second; time_unit is "s";
  unit per_nM = litre / (1e-9 mole);
  unit per_sec = 1 / second; per_sec is "s-1";
  unit nM_per_s = 1e-9 mole / (litre * second); nM_per_s is "nM/s";
  unit per_nMs = litre / (1e-9 mole * second); per_nMs is "nM-1 s-1";
end
