// SBML level 3 version 2

model EGFR_Reference_Model()
  // model units - substance: SOS_substance, time: SOS_time_unit

  // Compartments:
  compartment default_compartment = 1;
  compartment EGFR_cell = 1;
  compartment EGFR_extra = 5000; EGFR_extra is "extracellular space";
  compartment EGFR_intra = 1;
  compartment GAREM_cell = 1;
  compartment GAREM_extra = 1;
  compartment GAREM_intra = 1;
  compartment SHC_cell = 1;
  compartment SHC_extra = 1; SHC_extra is "extracellular space";
  compartment SHC_intra = 1;
  compartment GAB_cell = 1;
  compartment GAB_extra = 1;
  compartment GAB_intra = 1;
  compartment SOS_cell = 1;
  compartment SOS_extra = 5000;
  compartment SOS_intra = 1;
  compartment cell = 1;

  // Species:
  species EGFR_R in EGFR_cell = 208/EGFR_cell;  // substance in EGFR_nM_volume
  species EGFR_Ri in EGFR_intra = 0;  // substance in EGFR_nM_volume
  species EGFR_R_L in EGFR_cell = 0;  // substance in EGFR_nM_volume
  species EGFR_R_Li in EGFR_intra = 0;  // substance in EGFR_nM_volume
  species EGFR_pR_L in EGFR_cell = 0;
  species EGFR_pR_Li in EGFR_intra = 0;
  species EGFR_L in default_compartment = 1/default_compartment;  // substance in EGFR_nM_volume
  species $EGFR_aRtot in GAREM_cell;  // substance in EGFR_nM_volume
  species GAREM_Garem in GAREM_cell = 1/GAREM_cell;
  species GAREM_pGarem in GAREM_cell = 0;
  species SOS_Grb2 in SOS_cell = 37.11/SOS_cell;
  species GAREM_Shp2 in GAREM_cell = 1/GAREM_cell;
  species GAREM_Grb2_Garem in GAREM_cell = 0;
  species GAREM_Grb2_pGarem in GAREM_cell = 0;
  species GAREM_Grb2_ppGarem in GAREM_cell = 0;
  species GAREM_Grb2_ppGarem_Shp2 in GAREM_cell = 0;
  species GAREM_Grb2_ppGarem_pShp2 in GAREM_cell = 0;
  species SHC_Shc1 in default_compartment = 67.3/default_compartment;  // substance in EGFR_nM_volume
  species SHC_pShc1 in default_compartment = 0;  // substance in EGFR_nM_volume
  species SHC_ipShc1 in SHC_cell = 0;  // substance in EGFR_nM_volume
  species $SHC_Shc1Ihtr in SHC_cell = 0;  // substance in EGFR_nM_volume
  species GAB_Gab1 in default_compartment = 1/default_compartment;
  species GAB_pGab1 in default_compartment = 0;
  species GAB_peGab1 in GAB_cell = 0;
  species $GAB_Gab1Ehcr in GAB_cell = 0;
  species GAB_Shp2 in GAB_cell = 1/GAB_cell;
  species GAB_Grb2_Gab1 in GAB_cell = 0;
  species GAB_Grb2_pGab1 in GAB_cell = 0;
  species GAB_Grb2_ppGab1 in GAB_cell = 0;
  species GAB_Grb2_ppGab1_Shp2 in GAB_cell = 0;
  species GAB_Grb2_ppGab1_pShp2 in GAB_cell = 0;
  species $SOS_Sos1Ihtr in SOS_cell = 0;
  species SOS_SOS1 in default_compartment = 0.07/default_compartment;
  species SOS_Grb2_SOS1 in default_compartment = 3.98/default_compartment;
  species SOS_Grb2_pSOS1 in default_compartment = 0;
  species SOS_Grb2_ipSOS1 in SOS_cell = 0;
  species SOS_SOS2 in default_compartment = 0;
  species SOS_Grb2_SOS2 in default_compartment = 0;
  species SOS_Grb2_pSOS2 in SOS_cell = 0;
  species $SOS_aAdptrTot in default_compartment;
  species $aSOS in cell;

  // Parameters:
  EGFR_Vr = 0.242 EGFR_nM_per_sec;
  EGFR_kt = 0.0012 EGFR_per_sec;
  EGFR_k1 = 0.0016 EGFR_per_nMs;
  EGFR_k_1 = 0.004 EGFR_per_sec;
  EGFR_ke = 0.0033 EGFR_per_sec;
  EGFR_kx = 0.006 EGFR_per_sec;
  EGFR_kh = 0.004 EGFR_per_sec;
  EGFR_k3 = 0.3 EGFR_per_sec;
  EGFR_k_3 = 0.13 EGFR_per_sec;
  EGFR_aR has EGFR_nM;
  EGFR_aRi has EGFR_nM;
  EGFR_Rd = 0;
  EGFR_Rdi = 0;
  GAREM_k1 = 0.1;
  GAREM_k_1 = 1;
  GAREM_kcat2 = 10;
  GAREM_Km2 = 1;
  GAREM_V3 = 0.1;
  GAREM_Km3 = 1;
  GAREM_kcat4 = GAREM_kcat2;
  GAREM_Km4 = GAREM_Km2;
  GAREM_V5 = GAREM_V3;
  GAREM_Km5 = GAREM_Km3;
  GAREM_k6 = 0.1;
  GAREM_k_6 = 1;
  GAREM_k7 = 10;
  GAREM_k_7 = 1;
  SHC_kcat1 = 1130 SHC_per_sec;
  SHC_Km1 = 8167/23.4; SHC_Km1 has SHC_nM;
  SHC_kcat2 = 1000 SHC_per_sec;
  SHC_Km2 = 5000/100; SHC_Km2 has SHC_nM;
  GAB_k1 = 0.1;
  GAB_k_1 = 1;
  GAB_kcat2 = 10;
  GAB_Km2 = 1;
  GAB_m2 = 1;
  GAB_n2 = 1;
  GAB_Ke2 = 1;
  GAB_V3 = 0.1;
  GAB_Km3 = 1;
  GAB_kcat4 = GAB_kcat2;
  GAB_Km4 = GAB_Km2;
  GAB_m4 = GAB_m2;
  GAB_n4 = GAB_n2;
  GAB_Ke4 = GAB_Ke2;
  GAB_V5 = GAB_V3;
  GAB_Km5 = GAB_Km3;
  GAB_k6 = 0.1;
  GAB_k_6 = 1;
  GAB_k7 = 10;
  GAB_k_7 = 1;
  SOS_k1 = 9.45e-6 SOS_per_nMs;
  SOS_k_1 = 0.0138 SOS_per_sec;
  SOS_kcat2 = 10 SOS_per_sec;
  SOS_Km2 = 1 SOS_nM;
  SOS_kcat3 = 10 SOS_per_sec;
  SOS_Km3 = 1 SOS_nM;
  SOS_kcat4 = 10 SOS_per_sec;
  SOS_Km4 = 1 SOS_nM;

  // Assignment rules:
  EGFR_aRtot := EGFR_pR_L + EGFR_pR_Li;
  SOS_aAdptrTot := GAB_Grb2_ppGab1_pShp2 + GAREM_Grb2_ppGarem_pShp2 + SHC_pShc1 + EGFR_aRtot;
  aSOS := SOS_Grb2_pSOS1 + SOS_Grb2_pSOS2;
  EGFR_aR := EGFR_pR_L;
  EGFR_aRi := EGFR_pR_Li;

  // Reactions:
  EGFR_J1: => EGFR_R; EGFR_Vr;
  EGFR_J2: EGFR_R => EGFR_Ri; EGFR_kt*EGFR_R;
  EGFR_J3: EGFR_L + EGFR_R -> EGFR_R_L; EGFR_k1*EGFR_R*EGFR_L - EGFR_k_1*EGFR_R_L;
  EGFR_J4: EGFR_R_L => EGFR_R_Li; EGFR_ke*EGFR_R_L;
  EGFR_J5: EGFR_Ri => ; EGFR_kx*EGFR_Ri;
  EGFR_J6: EGFR_R_Li => ; EGFR_kh*EGFR_R_Li;
  EGFR_J7: EGFR_R_L -> EGFR_pR_L; EGFR_k3*EGFR_R_L - EGFR_k_3*EGFR_pR_L;
  EGFR_J8: EGFR_pR_L => EGFR_pR_Li; EGFR_ke*EGFR_pR_L;
  EGFR_J9: EGFR_pR_Li => ; EGFR_kh*EGFR_pR_Li;
  GAREM_J1: GAREM_Garem + SOS_Grb2 -> GAREM_Grb2_Garem; GAREM_k1*GAREM_Garem*SOS_Grb2 - GAREM_k_1*GAREM_Grb2_Garem;
  GAREM_J2: $EGFR_aRtot + GAREM_Grb2_Garem => $EGFR_aRtot + GAREM_Grb2_pGarem; GAREM_kcat2*EGFR_aRtot*GAREM_Grb2_Garem/(GAREM_Km2 + GAREM_Grb2_Garem);
  GAREM_J3: GAREM_Grb2_pGarem => GAREM_Grb2_Garem; GAREM_V3*GAREM_Grb2_pGarem/(GAREM_Km3 + GAREM_Grb2_pGarem);
  GAREM_J4: $EGFR_aRtot + GAREM_Grb2_pGarem => $EGFR_aRtot + GAREM_Grb2_ppGarem; GAREM_kcat4*EGFR_aRtot*GAREM_Grb2_Garem/(GAREM_Km4 + GAREM_Grb2_Garem);  // modifiers: GAREM_Grb2_Garem
  GAREM_J5: GAREM_Grb2_ppGarem => GAREM_Grb2_pGarem; GAREM_V5*GAREM_Grb2_pGarem/(GAREM_Km5 + GAREM_Grb2_pGarem);
  GAREM_J6: GAREM_Grb2_ppGarem + GAREM_Shp2 -> GAREM_Grb2_ppGarem_Shp2; GAREM_k6*GAREM_Grb2_ppGarem*GAREM_Shp2 - GAREM_k_6*GAREM_Grb2_ppGarem_Shp2;
  GAREM_J7: GAREM_Grb2_ppGarem_Shp2 -> GAREM_Grb2_ppGarem_pShp2; GAREM_k7*GAREM_Grb2_ppGarem_Shp2 - GAREM_k_7*GAREM_Grb2_ppGarem_pShp2;
  SHC_J1: $EGFR_aRtot + SHC_Shc1 -> $EGFR_aRtot + SHC_pShc1; SHC_kcat1*EGFR_aRtot*SHC_Shc1/(SHC_Km1 + SHC_Shc1);
  SHC_J2: $SHC_Shc1Ihtr + SHC_pShc1 -> $SHC_Shc1Ihtr + SHC_ipShc1; SHC_kcat2*SHC_Shc1Ihtr*SHC_pShc1/(SHC_Km2 + SHC_pShc1);
  GAB_J1: GAB_Gab1 + SOS_Grb2 -> GAB_Grb2_Gab1; GAB_k1*GAB_Gab1*SOS_Grb2 - GAB_k_1*GAB_Grb2_Gab1;
  GAB_J2: $EGFR_aRtot + $GAB_Gab1Ehcr + GAB_Grb2_Gab1 => $EGFR_aRtot + $GAB_Gab1Ehcr + GAB_Grb2_pGab1; GAB_kcat2*EGFR_aRtot*GAB_Grb2_Gab1/(GAB_Km2 + GAB_Grb2_Gab1)*(1 + GAB_m2*GAB_Gab1Ehcr^GAB_n2/(GAB_Ke2^GAB_n2 + GAB_Gab1Ehcr^GAB_n2));
  GAB_J3: GAB_Grb2_pGab1 => GAB_Grb2_Gab1; GAB_V3*GAB_Grb2_pGab1/(GAB_Km3 + GAB_Grb2_pGab1);
  GAB_J4: $EGFR_aRtot + $GAB_Gab1Ehcr + GAB_Grb2_pGab1 => $EGFR_aRtot + $GAB_Gab1Ehcr + GAB_Grb2_ppGab1; GAB_kcat4*EGFR_aRtot*GAB_Grb2_Gab1/(GAB_Km4 + GAB_Grb2_Gab1)*(1 + GAB_m4*GAB_Gab1Ehcr^GAB_n4/(GAB_Ke4^GAB_n4 + GAB_Gab1Ehcr^GAB_n4));  // modifiers: GAB_Grb2_Gab1
  GAB_J5: GAB_Grb2_ppGab1 => GAB_Grb2_pGab1; GAB_V5*GAB_Grb2_pGab1/(GAB_Km5 + GAB_Grb2_pGab1);
  GAB_J6: GAB_Grb2_ppGab1 + GAB_Shp2 -> GAB_Grb2_ppGab1_Shp2; GAB_k6*GAB_Grb2_ppGab1*GAB_Shp2 - GAB_k_6*GAB_Grb2_ppGab1_Shp2;
  GAB_J7: GAB_Grb2_ppGab1_Shp2 -> GAB_Grb2_ppGab1_pShp2; GAB_k7*GAB_Grb2_ppGab1_Shp2 - GAB_k_7*GAB_Grb2_ppGab1_pShp2;
  SOS_J1: SOS_Grb2 + SOS_SOS1 -> SOS_Grb2_SOS1; SOS_k1*SOS_Grb2*SOS_SOS1 - SOS_k_1*SOS_Grb2_SOS1;
  SOS_J2: $SOS_aAdptrTot + SOS_Grb2_SOS1 -> $SOS_aAdptrTot + SOS_Grb2_pSOS1; SOS_kcat2*SOS_aAdptrTot*SOS_Grb2_SOS1/(SOS_Km2 + SOS_Grb2_SOS1);
  SOS_J3: $SOS_Sos1Ihtr + SOS_Grb2_pSOS1 -> $SOS_Sos1Ihtr + SOS_Grb2_ipSOS1; SOS_kcat3*SOS_Sos1Ihtr*SOS_Grb2_pSOS1/(SOS_Km3 + SOS_Grb2_pSOS1);
  SOS_J4: $SOS_aAdptrTot + SOS_Grb2_SOS2 -> $SOS_aAdptrTot + SOS_Grb2_pSOS2; SOS_kcat4*SOS_aAdptrTot*SOS_Grb2_SOS2/(SOS_Km4 + SOS_Grb2_SOS2);

  // Unit definitions:
  unit EGFR_nM = 1e-9 mole / litre;
  unit EGFR_per_nMs = litre / (1e-9 mole * second); EGFR_per_nMs is "nM-1 s-1";
  unit EGFR_per_sec = 1 / second; EGFR_per_sec is "s-1";
  unit EGFR_nM_per_sec = 1;
  unit EGFR_substance = 1e-9 mole; EGFR_substance is "nmole";
  unit EGFR_time_unit = second; EGFR_time_unit is "s";
  unit EGFR_per_nM = litre / (1e-9 mole);
  unit EGFR_nM_per_s = 1e-9 mole / (litre * second); EGFR_nM_per_s is "nM/s";
  unit SHC_nM = 1e-9 mole / litre;
  unit SHC_per_sec = 1 / second; SHC_per_sec is "s-1";
  unit SHC_substance = 1e-9 mole; SHC_substance is "nmole";
  unit SHC_time_unit = second; SHC_time_unit is "s";
  unit SHC_per_nM = litre / (1e-9 mole);
  unit SHC_nM_per_sec = 1e-9 mole / (litre * second); SHC_nM_per_sec is "nM/s";
  unit SHC_per_nMs = litre / (1e-9 mole * second); SHC_per_nMs is "nM-1 s-1";
  unit SOS_per_nMs = litre / (1e-9 mole * second);
  unit SOS_per_sec = 1 / second;
  unit SOS_nM = 1e-9 mole / litre;
  unit SOS_substance = 1e-9 mole;
  unit SOS_time_unit = second;
  unit SOS_per_nM = litre / (1e-9 mole);
  unit SOS_nM_per_sec = 1e-9 mole / (litre * second);
end
