// SBML level 3 version 2

function x(t)
  0.01826339 + 3*6.851438e-8*(t - 0)^2;
end

function y(t)
  0.02122321 + 2*2.466518e-5*(t - 120) - 3*2.847016e-7*(t - 120)^2;
end

function z(t)
  0.01484375 - 2*7.782738e-5*(t - 240) + 3*1.038566e-7*(t - 240)^2;
end

function w(t)
  0.0006517857 - 2*4.043899e-5*(t - 360) + 3*1.123305e-7*(t - 360)^2;
end

function a(t)
  -0.02767758 + 3*1.974137e-6*(t - 0)^2;
end

function b(t)
  0.05760516 + 2*0.0007106895*(t - 120) - 3*2.56166e-6*(t - 120)^2;
end

function c(t)
  0.1175069 - 2*0.0002115079*(t - 240) + 3*8.766672e-9*(t - 240)^2;
end

function d(t)
  0.01749802 - 2*0.0002051959*(t - 480) + 3*2.849944e-7*(t - 480)^2;
end

model EGFR_combined()
  // model units - substance: substance, time: time_unit

  // Compartments:
  compartment default_compartment = 1;
  compartment cell = 1;
  compartment extra = 5000; extra is "extracellular space";
  compartment intra = 1;

  // Species:
  species Lig in extra = 1000/extra;
  species Egfr in cell = Vr/kt;
  species iEgfr in intra = 67/intra;
  species Egfr_Lig in cell = 2/cell;
  species iEgfr_Lig in intra = 1/intra;
  species pEgfr_Lig in cell = 0.8/cell;
  species ipEgfr_Lig in intra = 0.4/intra;
  species Garem in cell = 15.51/cell;
  species pGarem in cell = 0;
  species Grb2 in cell = 37.11/cell;
  species Shp2 in cell = 3.5/cell;
  species Grb2_Garem in cell = 3/cell;
  species Grb2_pGarem in cell = 0;
  species Grb2_ppGarem in cell = 0;
  species Grb2_ppGarem_Shp2 in cell = 0;
  species Grb2_ppGarem_pShp2 in cell = 0;
  species aR_Grb2_pGarem in cell = 0.1/cell;
  species Shc1 in cell = 28.564/cell;
  species pShc1 in cell = 0;
  species ipShc1 in cell = 0;
  species iShc1 in cell = 0;
  species Gab1 in cell = 3.142/cell;
  species pGab1 in cell = 0;
  species peGab1 in cell = 0;
  species Grb2_Gab1 in cell = 4/cell;
  species Grb2_pGab1 in cell = 0;
  species Grb2_ppGab1 in cell = 0;
  species Grb2_ppGab1_Shp2 in cell = 0;
  species Grb2_ppGab1_pShp2 in cell = 0;
  species SOS1 in cell = 0.07/cell;
  species Grb2_SOS1 in cell = 3.98/cell;
  species aRSK in cell = 2/cell;
  species pSOS1 in cell = 0.01/cell;
  species aR_Grb2_ppGarem_pShp2 in cell = 1/cell;
  species Ad1_Grb2_SOS1 in cell = 0.5/cell;
  species iAd1_Grb2_SOS1 in cell = 0.2/cell;
  species iaR_Grb2_ppGarem_pShp2 in cell = 0.05/cell;
  species aR_Grb2_ppGab1_pShp2 in cell = 0.1/cell;
  species Ad2_Grb2_SOS1 in cell = 0.5/cell;
  species iAd2_Grb2_SOS1 in cell = 0.2/cell;
  species iaR_Grb2_ppGab1_pShp2 in cell = 0.05/cell;
  species aR_pShc1 in cell = 0.74/cell;
  species Ad3_Grb2_SOS1 in cell = 0.5/cell;
  species iAd3_Grb2_SOS1 in cell = 0.2/cell;
  species iaR_pShc1 in cell = 0.5/cell;
  species Ras in cell = 141.65/cell;
  species aRas in cell = 2.7/cell;
  species Rasa1 in cell = 98/cell;
  species aR_Grb2_Garem in default_compartment = 0.1/default_compartment;
  species aR_Grb2_ppGarem in default_compartment = 0.96/default_compartment;
  species aR_Grb2_ppGarem_Shp2 in default_compartment = 0.1/default_compartment;
  species aR_Shc1 in default_compartment = 1/default_compartment;
  species aR_Grb2_Gab1 in default_compartment = 0.1/default_compartment;
  species aR_Grb2_pGab1 in default_compartment = 0.1/default_compartment;
  species aR_Grb2_ppGab1 in default_compartment = 0.36/default_compartment;
  species aR_Grb2_ppGab1_Shp2 in default_compartment = 0.1/default_compartment;

  // Parameters:
  Vr = 0.242;
  kt = 0.0012;
  kx = 1;
  k4 = 0.01450038;
  k_4 = 0.0009031856;
  ke = 0.001963329;
  kh = 0.0159459;
  k7 = 0.005154442;
  k_7 = 0.0001938188;
  k1 = 0.0001657105;
  k_1 = 0.04630436;
  k3 = 0.02289502;
  k_3 = 0.0001768599;
  k5 = 0.02702715;
  k_5 = 0.0001273199;
  k8 = 0.01432074;
  k_8 = 0.0001912286;
  k9 = 0.0008058882;
  k_9 = 0.0001620941;
  k11 = 0.94291;
  k12 = 0.02754799;
  k10 = 0.003401764;
  k_10 = 0.0001083611;
  kr = 0.02786499;
  kr2 = 0.1952682;
  k13 = 0.0004973444;
  k14 = 0.0001000389;
  k2 = 0.05849359;
  k_2 = 0.1738707;
  k6 = 0.04654301;
  k_6 = 0.0002352232;

  // Reactions:
  J1: => Egfr; Vr;
  J2: Egfr => iEgfr; kt*Egfr;
  J3: iEgfr => ; kx*iEgfr;
  J4: Lig + Egfr -> Egfr_Lig; k4*Egfr*Lig - k_4*Egfr_Lig;
  J5: Egfr_Lig => iEgfr_Lig; ke*Egfr_Lig;
  J6: iEgfr_Lig => ; kh*iEgfr_Lig;
  J7: Egfr_Lig -> pEgfr_Lig; k7*Egfr_Lig - k_7*pEgfr_Lig;
  J8: pEgfr_Lig => ipEgfr_Lig; ke*pEgfr_Lig;
  J9: ipEgfr_Lig => ; kh*ipEgfr_Lig;
  J10: Garem + Grb2 -> Grb2_Garem; k1*Garem*Grb2 - k_1*Grb2_Garem;
  J13: aR_Grb2_Garem => aR_Grb2_pGarem; k3*aR_Grb2_Garem - k_3*aR_Grb2_pGarem;
  J14: aR_Grb2_pGarem => aR_Grb2_ppGarem; k3*aR_Grb2_pGarem - k_3*aR_Grb2_ppGarem;
  J15: aR_Grb2_ppGarem + Shp2 => aR_Grb2_ppGarem_Shp2; k4*aR_Grb2_ppGarem*Shp2 - k_4*aR_Grb2_ppGarem_Shp2;
  J16: aR_Grb2_ppGarem_Shp2 => aR_Grb2_ppGarem_pShp2; k5*aR_Grb2_ppGarem_Shp2 - k_5*aR_Grb2_ppGarem_pShp2;
  J18: aR_Shc1 -> aR_pShc1; k3*aR_Shc1 - k_3*aR_pShc1;
  J19: Gab1 + Grb2 -> Grb2_Gab1; k7*Gab1*Grb2 - k_7*Grb2_Gab1;
  J21: aR_Grb2_Gab1 -> aR_Grb2_pGab1; k3*aR_Grb2_Gab1 - k_3*aR_Grb2_pGab1;
  J22: aR_Grb2_pGab1 -> aR_Grb2_ppGab1; k3*aR_Grb2_pGab1 - k_3*aR_Grb2_ppGab1;
  J23: aR_Grb2_ppGab1 + Shp2 -> aR_Grb2_ppGab1_Shp2; k8*aR_Grb2_ppGab1*Shp2 - k_8*aR_Grb2_ppGab1_Shp2;
  J24: aR_Grb2_ppGab1_Shp2 -> aR_Grb2_ppGab1_pShp2; k5*aR_Grb2_ppGab1_Shp2 - k_5*aR_Grb2_ppGab1_pShp2;
  J25: Grb2 + SOS1 -> Grb2_SOS1; k9*Grb2*SOS1 - k_9*Grb2_SOS1;
  J26: aRSK + Grb2_SOS1 -> Grb2 + pSOS1; k11*aRSK*Grb2_SOS1;
  J27: pSOS1 -> SOS1; k12*pSOS1;
  J28: aR_Grb2_ppGarem_pShp2 + Grb2_SOS1 -> Ad1_Grb2_SOS1; k10*aR_Grb2_ppGarem_pShp2*Grb2_SOS1 - k_10*Ad1_Grb2_SOS1;
  J29: Ad1_Grb2_SOS1 => iAd1_Grb2_SOS1; ke*Ad1_Grb2_SOS1;
  J30: iAd1_Grb2_SOS1 => Grb2_SOS1 + iaR_Grb2_ppGarem_pShp2; kr*iAd1_Grb2_SOS1;
  J31: iaR_Grb2_ppGarem_pShp2 => ipEgfr_Lig + Grb2_Garem + Shp2; kr2*iaR_Grb2_ppGarem_pShp2;
  J32: aR_Grb2_ppGab1_pShp2 + Grb2_SOS1 -> Ad2_Grb2_SOS1; k10*aR_Grb2_ppGab1_pShp2*Grb2_SOS1 - k_10*Ad2_Grb2_SOS1;
  J33: Ad2_Grb2_SOS1 => iAd2_Grb2_SOS1; ke*Ad2_Grb2_SOS1;
  J34: iAd2_Grb2_SOS1 => Grb2_SOS1 + iaR_Grb2_ppGab1_pShp2; kr*iAd2_Grb2_SOS1;
  J35: iaR_Grb2_ppGab1_pShp2 => ipEgfr_Lig + Grb2_Gab1 + Shp2; kr2*iaR_Grb2_ppGab1_pShp2;
  J36: aR_pShc1 + Grb2_SOS1 -> Ad3_Grb2_SOS1; k10*aR_pShc1*Grb2_SOS1 - k_10*Ad3_Grb2_SOS1;
  J37: Ad3_Grb2_SOS1 => iAd3_Grb2_SOS1; ke*Ad3_Grb2_SOS1;
  J38: iAd3_Grb2_SOS1 => Grb2_SOS1 + iaR_pShc1; kr*iAd3_Grb2_SOS1;
  J39: iaR_pShc1 => ipEgfr_Lig + Shc1; kr2*iaR_pShc1;
  J40: Ad1_Grb2_SOS1 + Ras => Ad1_Grb2_SOS1 + aRas; k13*Ad1_Grb2_SOS1*Ras;
  J41: Ad2_Grb2_SOS1 + Ras => Ad2_Grb2_SOS1 + aRas; k13*Ad2_Grb2_SOS1*Ras;
  J42: Ad3_Grb2_SOS1 + Ras => Ad3_Grb2_SOS1 + aRas; k13*Ad3_Grb2_SOS1*Ras;
  J43: aRas + Rasa1 => Ras + Rasa1; k14*aRas*Rasa1;

  // Unit definitions:
  unit nM = 1e-9 mole / litre;
  unit substance = 1e-9 mole; substance is "nmole";
  unit time_unit = second; time_unit is "s";
  unit per_nM = litre / (1e-9 mole);
  unit per_sec = 1 / second; per_sec is "s-1";
  unit nM_per_s = 1e-9 mole / (litre * second); nM_per_s is "nM/s";
  unit per_nMs = litre / (1e-9 mole * second); per_nMs is "nM-1 s-1";
end
