// SBML level 3 version 2

function x(t)
  1.095804 - 2*2.220446e-16*(t - 0) + 3*0.01479911*(t - 0)^2;
end

function y(t)
  1.273393 + 2*0.08879464*(t - 2) - 3*0.06149554*(t - 2)^2;
end

function z(t)
  0.890625 - 2*0.2801786*(t - 4) + 3*0.02243304*(t - 4)^2;
end

function w(t)
  0.03910714 - 2*0.1455804*(t - 6) + 3*0.02426339*(t - 6)^2;
end

function gx(t)
  1.095804 - 2*2.220446e-16*(t - 0) + 3*0.01479911*(t - 0)^2;
end

function gy(t)
  1.273393 + 2*0.08879464*(t - 2) - 3*0.06149554*(t - 2)^2;
end

function gz(t)
  0.890625 - 2*0.2801786*(t - 4) + 3*0.02243304*(t - 4)^2;
end

function gw(t)
  0.03910714 - 2*0.1455804*(t - 6) + 3*0.02426339*(t - 6)^2;
end

model EGFR_module()
  // model units - substance: substance, time: time_unit

  // Compartments:
  compartment default_compartment = 1;
  compartment cell = 1;
  compartment extra = 5000; extra is "extracellular space";
  compartment intra = 1;

  // Species:
  species Tgfa in extra = 825/extra;
  species Hbegf in extra = 0;
  species Ar in extra = 0;
  species Epgn in extra = 0;
  species Egfr in cell = 190/cell;
  species iEgfr in intra = 0;
  species Egfr_Tgfa in cell = 0;
  species iR_Tgfa in intra = 0;
  species pEgfr_Tgfa in cell = 0;
  species ipEgfr_Tgfa in intra = 0;
  species Egfr_Hbegf in cell = 0;
  species iR_Hbegf in intra = 0;
  species pEgfr_Hbegf in cell = 0;
  species ipEgfr_Hbegf in intra = 0;
  species Egfr_Ar in cell = 0;
  species iR_Ar in intra = 0;
  species pEgfr_Ar in cell = 0;
  species ipEgfr_Ar in intra = 0;
  species Egfr_Epgn in cell = 0;
  species iR_Epgn in intra = 0;
  species pEgfr_Epgn in cell = 0;
  species ipEgfr_Epgn in intra = 0;
  species Garem in cell = 15.51/cell;
  species pGarem in cell = 0;
  species $aRtot in cell;
  species Grb2 in cell = 19.1/cell;
  species Shp2 in cell = 3.5/cell;
  species Grb2_Garem in cell = 0;
  species Grb2_pGarem in cell = 0;
  species Grb2_ppGarem in cell = 0;
  species Grb2_ppGarem_Shp2 in cell = 0;
  species Grb2_ppGarem_pShp2 in cell = 0.96/cell;
  species Shc1 in default_compartment = 28.564/default_compartment;
  species pShc1 in default_compartment = 0.74/default_compartment;
  species ipShc1 in cell = 0;
  species iShc1 in cell = 0;
  species $Shc1Ihtr in cell = 1;
  species Gab1 in default_compartment = 3.142/default_compartment;
  species pGab1 in default_compartment = 0;
  species peGab1 in cell = 0;
  species $Gab1Ehcr in cell = 1;
  species Grb2_Gab1 in cell = 0;
  species Grb2_pGab1 in cell = 0;
  species Grb2_ppGab1 in cell = 0;
  species Grb2_ppGab1_Shp2 in cell = 0;
  species Grb2_ppGab1_pShp2 in cell = 0;
  species Gab1_pShp2 in default_compartment = 0;
  species Garem_pShp2 in default_compartment = 0;
  species $Sos1Ihtr in cell = 1;
  species SOS1 in default_compartment = 0;
  species Grb2_SOS1 in default_compartment = 6.2/default_compartment;
  species Grb2_pSOS1 in default_compartment = 0;
  species Grb2_ipSOS1 in cell = 0;
  species iEgfr_Tgfa in default_compartment = 0;
  species iEgfr_Hbegf in default_compartment = 0;
  species iEgfr_Ar in default_compartment = 0;
  species iEgfr_Epgn in default_compartment = 0;
  species shc_phos in default_compartment = 1/default_compartment;
  species $aAdptrTot in default_compartment;
  species dRas in default_compartment = 98/default_compartment;
  species tRas in default_compartment = 0;

  // Parameters:
  Vr = 9.617071;
  kt = 0.5738355;
  kx = 0.1698682;
  k4 = 0.003156616;
  k_4 = 0.004424399;
  ke = 0.002906649;
  kh = 0.0003278779;
  k7 = 0.0607377;
  k_7 = 0.09764357;
  k10 = 2.935209;
  k_10 = 3.706432;
  k13 = 7.208026;
  k_13 = 6.067754;
  k16 = 0.1132043;
  k_16 = 1.227625;
  k19 = 0.4034643;
  k_19 = 0.4147037;
  k22 = 0.49234;
  k_22 = 0.3157747;
  k25 = 2.115872;
  k_25 = 0.134445;
  aR has nM;
  aRi has nM;
  k29 = 9.67677;
  k_29 = 0.2269022;
  kcat30 = 9.710113;
  Km30 = 0.4598021;
  V31 = 1.998161;
  Km31 = 0.1251326;
  kcat32 = 2.252305;
  Km32 = 0.5752042;
  V33 = 0.1398388;
  Km33 = 7.84576;
  k34 = 9.416589;
  k_34 = 3.400039;
  k35 = 3.426876;
  k_35 = 0.1042591;
  kcat36 = 2.297136;
  kcat37 = 60.33834;
  k39 = 4.294446;
  k_39 = 0.1204585;
  kcat40 = 0.1167154;
  Km40 = 1.01974;
  m40 = 0.784137;
  n40 = 1.04851;
  Ke40 = 1.083007;
  V41 = 8.936321;
  Km41 = 0.7451017;
  kcat42 = 0.3179981;
  Km42 = 0.3071397;
  m42 = 2.280211;
  n42 = 0.8090057;
  Ke42 = 0.3183751;
  V43 = 0.7574558;
  Km43 = 3.705261;
  k44 = 0.8495733;
  k_44 = 0.1897879;
  k45 = 1.561058;
  k_45 = 3.218079;
  kcat46 = 0.5271984;
  Km46 = 0.2126528;
  kcat47 = 9.999974;
  Km47 = 7.718076;
  ktRas = 4.436441;
  KmRasd = 1.132469;
  kdRas = 0.7401491;
  GAP = 1;
  KmRast = 0.1345746;

  // Assignment rules:
  aRtot := aR + aRi;
  aAdptrTot := Grb2_ppGab1_pShp2 + Grb2_ppGarem_pShp2 + pShc1;
  aR := pEgfr_Tgfa + pEgfr_Hbegf + pEgfr_Ar + pEgfr_Epgn;
  aRi := ipEgfr_Tgfa + ipEgfr_Hbegf + ipEgfr_Ar + ipEgfr_Epgn;
  aSOS := Grb2_pSOS1;

  // Reactions:
  J1: => Egfr; Vr;
  J2: Egfr => iEgfr; kt*Egfr;
  J3: iEgfr => ; kx*iEgfr;
  J4: Tgfa + Egfr -> Egfr_Tgfa; k4*Egfr*Tgfa - k_4*Egfr_Tgfa;
  J5: Egfr_Tgfa => iEgfr_Tgfa; ke*Egfr_Tgfa;
  J6: iEgfr_Tgfa => ; kh*iEgfr_Tgfa;
  J7: Egfr_Tgfa -> pEgfr_Tgfa; k7*Egfr_Tgfa - k_7*pEgfr_Tgfa;
  J8: pEgfr_Tgfa => ipEgfr_Tgfa; ke*pEgfr_Tgfa;
  J9: ipEgfr_Tgfa => ; kh*ipEgfr_Tgfa;
  J10: Hbegf + Egfr -> Egfr_Hbegf; k10*Egfr*Hbegf - k_10*Egfr_Hbegf;
  J11: Egfr_Hbegf => iEgfr_Hbegf; ke*Egfr_Hbegf;
  J12: iEgfr_Hbegf => ; kh*iEgfr_Hbegf;
  J13: Egfr_Hbegf -> pEgfr_Hbegf; k13*Egfr_Hbegf - k_13*pEgfr_Hbegf;
  J14: pEgfr_Hbegf => ipEgfr_Hbegf; ke*pEgfr_Hbegf;
  J15: ipEgfr_Hbegf => ; kh*ipEgfr_Hbegf;
  J16: Ar + Egfr -> Egfr_Ar; k16*Egfr*Ar - k_16*Egfr_Ar;
  J17: Egfr_Ar => iEgfr_Ar; ke*Egfr_Ar;
  J18: iEgfr_Ar => ; kh*iEgfr_Ar;
  J19: Egfr_Ar -> pEgfr_Ar; k19*Egfr_Ar - k_19*pEgfr_Ar;
  J20: pEgfr_Ar => ipEgfr_Ar; ke*pEgfr_Ar;
  J21: ipEgfr_Ar => ; kh*ipEgfr_Ar;
  J22: Epgn + Egfr -> Egfr_Epgn; k22*Egfr*Epgn - k_22*Egfr_Epgn;
  J23: Egfr_Epgn => iEgfr_Epgn; ke*Egfr_Epgn;
  J24: iEgfr_Epgn => ; kh*iEgfr_Epgn;
  J25: Egfr_Epgn -> pEgfr_Epgn; k25*Egfr_Epgn - k_25*pEgfr_Epgn;
  J26: pEgfr_Epgn => ipEgfr_Epgn; ke*pEgfr_Epgn;
  J27: ipEgfr_Epgn => ; kh*ipEgfr_Epgn;
  J28: -> Shp2; piecewise(x(time), time <= 2, y(time), time <= 4, z(time), time <= 6, w(time), time <= 8);
  J29: Garem + Grb2 -> Grb2_Garem; k29*Garem*Grb2 - k_29*Grb2_Garem;
  J30: $aRtot + Grb2_Garem => $aRtot + Grb2_pGarem; kcat30*aRtot*Grb2_Garem/(Km30 + Grb2_Garem);
  J31: Grb2_pGarem => Grb2_Garem; V31*Grb2_pGarem/(Km31 + Grb2_pGarem);
  J32: $aRtot + Grb2_pGarem => $aRtot + Grb2_ppGarem; kcat32*aRtot*Grb2_Garem/(Km32 + Grb2_Garem);  // modifiers: Grb2_Garem
  J33: Grb2_ppGarem => Grb2_pGarem; V33*Grb2_pGarem/(Km33 + Grb2_pGarem);
  J34: Grb2_ppGarem + Shp2 -> Grb2_ppGarem_Shp2; k34*Grb2_ppGarem*Shp2 - k_34*Grb2_ppGarem_Shp2;
  J35: Grb2_ppGarem_Shp2 -> Grb2_ppGarem_pShp2; k35*Grb2_ppGarem_Shp2 - k_35*Grb2_ppGarem_pShp2;
  J36: $aRtot + Shc1 -> $aRtot + pShc1; kcat36*aRtot*Shc1;
  J37: shc_phos + pShc1 -> shc_phos + Shc1; kcat37*shc_phos*pShc1;
  J38: -> Shp2; piecewise(gx(time), time <= 2, gy(time), time <= 4, gz(time), time <= 6, gw(time), time <= 8);
  J39: Gab1 + Grb2 -> Grb2_Gab1; k39*Gab1*Grb2 - k_39*Grb2_Gab1;
  J40: $aRtot + $Gab1Ehcr + Grb2_Gab1 => $aRtot + $Gab1Ehcr + Grb2_pGab1; kcat40*aRtot*Grb2_Gab1/(Km40 + Grb2_Gab1)*(1 + m40*Gab1Ehcr^n40/(Ke40^n40 + Gab1Ehcr^n40));
  J41: Grb2_pGab1 => Grb2_Gab1; V41*Grb2_pGab1/(Km41 + Grb2_pGab1);
  J42: $aRtot + $Gab1Ehcr + Grb2_pGab1 => $aRtot + $Gab1Ehcr + Grb2_ppGab1; kcat42*aRtot*Grb2_Gab1/(Km42 + Grb2_Gab1)*(1 + m42*Gab1Ehcr^n42/(Ke42^n42 + Gab1Ehcr^n42));  // modifiers: Grb2_Gab1
  J43: Grb2_ppGab1 => Grb2_pGab1; V43*Grb2_pGab1/(Km43 + Grb2_pGab1);
  J44: Grb2_ppGab1 + Shp2 -> Grb2_ppGab1_Shp2; k44*Grb2_ppGab1*Shp2 - k_44*Grb2_ppGab1_Shp2;
  J45: Grb2_ppGab1_Shp2 -> Grb2_ppGab1_pShp2; k45*Grb2_ppGab1_Shp2 - k_45*Grb2_ppGab1_pShp2;
  J46: $aAdptrTot + Grb2_SOS1 -> $aAdptrTot + Grb2_pSOS1; kcat46*aAdptrTot*Grb2_SOS1/(Km46 + Grb2_SOS1);
  J47: $Sos1Ihtr + Grb2_pSOS1 -> $Sos1Ihtr + Grb2_ipSOS1; kcat47*Sos1Ihtr*Grb2_pSOS1/(Km47 + Grb2_pSOS1);
  J48: dRas => tRas; ktRas*dRas*aSOS/(KmRasd + dRas);
  J49: tRas => dRas; kdRas*tRas*GAP/(KmRast + tRas);

  // Unit definitions:
  unit nM = 1e-9 mole / litre;
  unit substance = 1e-9 mole; substance is "nmole";
  unit time_unit = second; time_unit is "s";
  unit per_nM = litre / (1e-9 mole);
  unit per_sec = 1 / second; per_sec is "s-1";
  unit nM_per_s = 1e-9 mole / (litre * second); nM_per_s is "nM/s";
  unit per_nMs = litre / (1e-9 mole * second); per_nMs is "nM-1 s-1";
end
