// SBML level 3 version 2

model EGFR_combined()
  // model units - substance: substance, time: time_unit

  // Compartments:
  compartment cell = 1;
  compartment extra = 5000; extra is "extracellular space";
  compartment intra = 1;

  // Species:
  species Lig in extra = 825/extra;
  species Egfr in cell = 135/cell;
  species iEgfr in intra = 73/intra;
  species Egfr_Lig in cell = 0.12/cell;
  species iEgfr_Lig in intra = 0.06/intra;
  species pEgfr_Lig in cell = 0.8/cell;
  species ipEgfr_Lig in intra = 0.4/intra;
  species aRtot in cell;

  // Parameters:
  Vr = 0.242;
  kt = 0.0012;
  kx = 1;
  kf = 0.01599573;
  kr = 0.006853632;
  ke = 0.0037;
  kh = 0.0004;
  kp = 0.02622008;
  k_p = 0.13;

  // Assignment rules:
  aRtot := pEgfr_Lig + ipEgfr_Lig;

  // Reactions:
  J1: => Egfr; Vr;
  J2: Egfr => iEgfr; kt*Egfr;
  J3: iEgfr => ; kx*iEgfr;
  J4: Egfr -> Egfr_Lig; kf*Egfr*Lig - kr*Egfr_Lig;  // modifiers: Lig
  J5: Egfr_Lig => iEgfr_Lig; ke*Egfr_Lig;
  J6: iEgfr_Lig => ; kh*iEgfr_Lig;
  J7: Egfr_Lig -> pEgfr_Lig; kp*Egfr_Lig - k_p*pEgfr_Lig;
  J8: pEgfr_Lig => ipEgfr_Lig; ke*pEgfr_Lig;
  J9: ipEgfr_Lig => ; kh*ipEgfr_Lig;

  // Unit definitions:
  unit nM = 1e-9 mole / litre;
  unit substance = 1e-9 mole; substance is "nmole";
  unit time_unit = second; time_unit is "s";
  unit per_nM = litre / (1e-9 mole);
  unit per_sec = 1 / second; per_sec is "s-1";
  unit nM_per_s = 1e-9 mole / (litre * second); nM_per_s is "nM/s";
  unit per_nMs = litre / (1e-9 mole * second); per_nMs is "nM-1 s-1";
end
