// SBML level 3 version 2

function a(t)
  2.499782 - 3*0.07994551*(t - 0)^2;
end

function b(t)
  1.540436 - 2*0.4796731*(t - 2) + 3*0.06847756*(t - 2)^2;
end

function c(t)
  0.4434744 - 2*0.06880769*(t - 4) + 3*0.002285256*(t - 4)^2;
end

function d(t)
  0.1956667 - 2*0.05509615*(t - 6) + 3*0.00613141*(t - 6)^2;
end

function x(t)
  1.095804 - 2*2.220446e-16*(t - 0) + 3*0.01479911*(t - 0)^2;
end

function y(t)
  1.273393 + 2*0.08879464*(t - 2) - 3*0.06149554*(t - 2)^2;
end

function z(t)
  0.890625 - 2*0.2801786*(t - 4) + 3*0.02243304*(t - 4)^2;
end

function w(t)
  0.03910714 - 2*0.1455804*(t - 6) + 3*0.02426339*(t - 6)^2;
end

model GAB_module()

  // Compartments:
  compartment default_compartment = 1;
  compartment cell = 1;
  compartment extra = 1;
  compartment intra = 1;

  // Species:
  species Gab1 in default_compartment = 3.142/default_compartment;
  species pGab1 in default_compartment = 0;
  species peGab1 in cell = 0;
  species aRtot in default_compartment = 0;
  species $Gab1Ehcr in cell = 1;
  species Grb2 in default_compartment = 19.1/default_compartment;
  species Shp2 in cell = 3.5/cell;
  species Grb2_Gab1 in cell = 0;
  species Grb2_pGab1 in cell = 0;
  species Grb2_ppGab1 in cell = 0;
  species Grb2_ppGab1_Shp2 in cell = 0;
  species Grb2_ppGab1_pShp2 in cell = 0;

  // Parameters:
  k1 = 4.294446;
  k_1 = 0.1204585;
  kcat2 = 0.1167154;
  Km2 = 1.01974;
  m2 = 0.784137;
  n2 = 1.04851;
  Ke2 = 1.083007;
  V3 = 8.936321;
  Km3 = 0.7451017;
  kcat4 = 0.3179981;
  Km4 = 0.3071397;
  m4 = 2.280211;
  n4 = 0.8090057;
  Ke4 = 0.3183751;
  V5 = 0.7574558;
  Km5 = 3.705261;
  k6 = 0.8495733;
  k_6 = 0.1897879;
  k7 = 1.561058;
  k_7 = 3.218079;

  // Reactions:
  J0: -> aRtot; piecewise(a(time), time <= 2, b(time), time <= 4, c(time), time <= 6, d(time), time <= 8);
  J1: -> Shp2; piecewise(x(time), time <= 2, y(time), time <= 4, z(time), time <= 6, w(time), time <= 8);
  J2: Gab1 + Grb2 -> Grb2_Gab1; k1*Gab1*Grb2 - k_1*Grb2_Gab1;
  J3: aRtot + $Gab1Ehcr + Grb2_Gab1 => aRtot + $Gab1Ehcr + Grb2_pGab1; kcat2*aRtot*Grb2_Gab1/(Km2 + Grb2_Gab1)*(1 + m2*Gab1Ehcr^n2/(Ke2^n2 + Gab1Ehcr^n2));
  J4: Grb2_pGab1 => Grb2_Gab1; V3*Grb2_pGab1/(Km3 + Grb2_pGab1);
  J5: aRtot + $Gab1Ehcr + Grb2_pGab1 => aRtot + $Gab1Ehcr + Grb2_ppGab1; kcat4*aRtot*Grb2_Gab1/(Km4 + Grb2_Gab1)*(1 + m4*Gab1Ehcr^n4/(Ke4^n4 + Gab1Ehcr^n4));  // modifiers: Grb2_Gab1
  J6: Grb2_ppGab1 => Grb2_pGab1; V5*Grb2_pGab1/(Km5 + Grb2_pGab1);
  J7: Grb2_ppGab1 + Shp2 -> Grb2_ppGab1_Shp2; k6*Grb2_ppGab1*Shp2 - k_6*Grb2_ppGab1_Shp2;
  J8: Grb2_ppGab1_Shp2 -> Grb2_ppGab1_pShp2; k7*Grb2_ppGab1_Shp2 - k_7*Grb2_ppGab1_pShp2;
end
