// SBML level 3 version 2

function a(t)
  0.04166303 - 2*1.151965e-19*(t - 0) - 3*3.701181e-7*(t - 0)^2;
end

function b(t)
  0.02567393 - 2*0.0001332425*(t - 120) + 3*3.170258e-7*(t - 120)^2;
end

function c(t)
  0.007391239 - 2*1.911325e-5*(t - 240) + 3*1.057989e-8*(t - 240)^2;
end

function d(t)
  0.003261111 - 2*1.530449e-5*(t - 360) + 3*2.838616e-8*(t - 360)^2;
end

function x(t)
  0.01826339 + 3*6.851438e-8*(t - 0)^2;
end

function y(t)
  0.02122321 + 2*2.466518e-5*(t - 120) - 3*2.847016e-7*(t - 120)^2;
end

function z(t)
  0.01484375 - 2*7.782738e-5*(t - 240) + 3*1.038566e-7*(t - 240)^2;
end

function w(t)
  0.0006517857 - 2*4.043899e-5*(t - 360) + 3*1.123305e-7*(t - 360)^2;
end

model GAB_module()

  // Compartments:
  compartment default_compartment = 1;
  compartment cell = 1;
  compartment extra = 1;
  compartment intra = 1;

  // Species:
  species Gab1 in cell = 3.142/cell;
  species pGab1 in cell = 0;
  species pEgfr_Lig in cell = 0;
  species Grb2 in cell = 19.1/cell;
  species Shp2 in cell = 3.5/cell;
  species aR_Grb2_Gab1 in cell = 0.1/cell;
  species aR_Grb2_pGab1 in cell = 0.1/cell;
  species aR_Grb2_ppGab1 in cell = 0.36/cell;
  species aR_Grb2_ppGab1_Shp2 in cell = 0.1/cell;
  species aR_Grb2_ppGab1_pShp2 in cell = 0.1/cell;
  species Grb2_Gab1 in default_compartment = 4/default_compartment;

  // Parameters:
  k7 = 4.536606;
  k_7 = 0.1465029;
  k8 = 0.2469766;
  k_8 = 0.447631;
  k3 = 0.2371457;
  k_3 = 0.2159941;
  k5 = 0.09404764;
  k_5 = 0.2544777;

  // Reactions:
  F3: -> pEgfr_Lig; piecewise(a(time), time <= 120, b(time), time <= 240, c(time), time <= 360, d(time), time <= 480);
  F4: -> Shp2; piecewise(x(time), time <= 120, y(time), time <= 240, z(time), time <= 360, w(time), time <= 480);
  J2: Gab1 + Grb2 -> Grb2_Gab1; k7*Gab1*Grb2 - k_7*Grb2_Gab1;
  J3: pEgfr_Lig + Grb2_Gab1 -> aR_Grb2_Gab1; k8*pEgfr_Lig*Grb2_Gab1 - k_8*aR_Grb2_Gab1;
  J4: aR_Grb2_Gab1 -> aR_Grb2_pGab1; k3*aR_Grb2_Gab1 - k_3*aR_Grb2_pGab1;
  J5: aR_Grb2_pGab1 -> aR_Grb2_ppGab1; k3*aR_Grb2_pGab1 - k_3*aR_Grb2_ppGab1;
  J6: aR_Grb2_ppGab1 + Shp2 -> aR_Grb2_ppGab1_Shp2; k8*aR_Grb2_ppGab1*Shp2 - k_8*aR_Grb2_ppGab1_Shp2;
  J7: aR_Grb2_ppGab1_Shp2 -> aR_Grb2_ppGab1_pShp2; k5*aR_Grb2_ppGab1_Shp2 - k_5*aR_Grb2_ppGab1_pShp2;
end
