// SBML level 3 version 2

function a(t)
  2.499782 - 3*0.07994551*(t - 0)^2;
end

function b(t)
  1.540436 - 2*0.4796731*(t - 2) + 3*0.06847756*(t - 2)^2;
end

function c(t)
  0.4434744 - 2*0.06880769*(t - 4) + 3*0.002285256*(t - 4)^2;
end

function d(t)
  0.1956667 - 2*0.05509615*(t - 6) + 3*0.00613141*(t - 6)^2;
end

function x(t)
  1.095804 - 2*2.220446e-16*(t - 0) + 3*0.01479911*(t - 0)^2;
end

function y(t)
  1.273393 + 2*0.08879464*(t - 2) - 3*0.06149554*(t - 2)^2;
end

function z(t)
  0.890625 - 2*0.2801786*(t - 4) + 3*0.02243304*(t - 4)^2;
end

function w(t)
  0.03910714 - 2*0.1455804*(t - 6) + 3*0.02426339*(t - 6)^2;
end

model GAREM_module()

  // Compartments:
  compartment cell = 1;
  compartment extra = 1;
  compartment intra = 1;

  // Species:
  species Garem in cell = 15.51/cell;
  species pGarem in cell = 0;
  species aRtot in cell = 0;
  species Grb2 in cell = 19.1/cell;
  species Shp2 in cell = 3.5/cell;
  species Grb2_Garem in cell = 0;
  species Grb2_pGarem in cell = 0;
  species Grb2_ppGarem in cell = 0;
  species Grb2_ppGarem_Shp2 in cell = 0;
  species Grb2_ppGarem_pShp2 in cell = 0.96/cell;

  // Parameters:
  k1 = 9.67677;
  k_1 = 0.2269022;
  kcat2 = 9.710113;
  Km2 = 0.4598021;
  V3 = 1.998161;
  Km3 = 0.1251326;
  kcat4 = 2.252305;
  Km4 = 0.5752042;
  V5 = 0.1398388;
  Km5 = 7.84576;
  k6 = 9.416589;
  k_6 = 3.400039;
  k7 = 3.426876;
  k_7 = 0.1042591;

  // Reactions:
  J0: -> aRtot; piecewise(a(time), time <= 2, b(time), time <= 4, c(time), time <= 6, d(time), time <= 8);
  J1: -> Shp2; piecewise(x(time), time <= 2, y(time), time <= 4, z(time), time <= 6, w(time), time <= 8);
  J2: Garem + Grb2 -> Grb2_Garem; k1*Garem*Grb2 - k_1*Grb2_Garem;
  J3: aRtot + Grb2_Garem => aRtot + Grb2_pGarem; kcat2*aRtot*Grb2_Garem/(Km2 + Grb2_Garem);
  J4: Grb2_pGarem => Grb2_Garem; V3*Grb2_pGarem/(Km3 + Grb2_pGarem);
  J5: aRtot + Grb2_pGarem => aRtot + Grb2_ppGarem; kcat4*aRtot*Grb2_Garem/(Km4 + Grb2_Garem);  // modifiers: Grb2_Garem
  J6: Grb2_ppGarem => Grb2_pGarem; V5*Grb2_pGarem/(Km5 + Grb2_pGarem);
  J7: Grb2_ppGarem + Shp2 -> Grb2_ppGarem_Shp2; k6*Grb2_ppGarem*Shp2 - k_6*Grb2_ppGarem_Shp2;
  J8: Grb2_ppGarem_Shp2 -> Grb2_ppGarem_pShp2; k7*Grb2_ppGarem_Shp2 - k_7*Grb2_ppGarem_pShp2;
end
