// SBML level 3 version 2

function a(t)
  2*(0.04166303 - 2*1.151965e-19*(t - 0) - 3*3.701181e-7*(t - 0)^2);
end

function b(t)
  2*(0.02567393 - 2*0.0001332425*(t - 120) + 3*3.170258e-7*(t - 120)^2);
end

function c(t)
  2*(0.007391239 - 2*1.911325e-5*(t - 240) + 3*1.057989e-8*(t - 240)^2);
end

function d(t)
  2*(0.003261111 - 2*1.530449e-5*(t - 360) + 3*2.838616e-8*(t - 360)^2);
end

function x(t)
  0.01826339 + 3*6.851438e-8*(t - 0)^2;
end

function y(t)
  0.02122321 + 2*2.466518e-5*(t - 120) - 3*2.847016e-7*(t - 120)^2;
end

function z(t)
  0.01484375 - 2*7.782738e-5*(t - 240) + 3*1.038566e-7*(t - 240)^2;
end

function w(t)
  0.0006517857 - 2*4.043899e-5*(t - 360) + 3*1.123305e-7*(t - 360)^2;
end

model GAREM_module()

  // Compartments:
  compartment cell = 1;
  compartment extra = 1;
  compartment intra = 1;

  // Species:
  species Garem in cell = 15.51/cell;
  species pGarem in cell = 0;
  species pEgfr_Lig in cell = 0.8/cell;
  species Grb2 in cell = 37.11/cell;
  species Shp2 in cell = 3.5/cell;
  species Grb2_Garem in cell = 3/cell;
  species aR_Grb2_Garem in cell = 0.1/cell;
  species aR_Grb2_pGarem in cell = 0.1/cell;
  species aR_Grb2_ppGarem in cell = 0.96/cell;
  species aR_Grb2_ppGarem_Shp2 in cell = 0.1/cell;
  species aR_Grb2_ppGarem_pShp2 in cell = 1/cell;

  // Parameters:
  k1 = 0.1491404;
  k_1 = 0.08030988;
  k2 = 0.154399;
  k_2 = 0.09717261;
  k3 = 0.4707769;
  k_3 = 0.07164332;
  k4 = 0.1400917;
  k_4 = 0.1887135;
  k5 = 0.2814586;
  k_5 = 0.1408063;

  // Reactions:
  F0: -> pEgfr_Lig; piecewise(a(time), time <= 120, b(time), time <= 240, c(time), time <= 360, d(time), time <= 480);
  F1: -> Shp2; piecewise(x(time), time <= 120, y(time), time <= 240, z(time), time <= 360, w(time), time <= 480);
  J1: Garem + Grb2 -> Grb2_Garem; k1*Garem*Grb2 - k_1*Grb2_Garem;
  J2: pEgfr_Lig + Grb2_Garem => aR_Grb2_Garem; k2*pEgfr_Lig*Grb2_Garem - k_2*aR_Grb2_Garem;
  J3: aR_Grb2_Garem => aR_Grb2_pGarem; k3*aR_Grb2_Garem - k_3*aR_Grb2_pGarem;
  J4: aR_Grb2_pGarem => aR_Grb2_ppGarem; k3*aR_Grb2_pGarem - k_3*aR_Grb2_ppGarem;
  J5: aR_Grb2_ppGarem + Shp2 => aR_Grb2_ppGarem_Shp2; k4*aR_Grb2_ppGarem*Shp2 - k_4*aR_Grb2_ppGarem_Shp2;
  J6: aR_Grb2_ppGarem_Shp2 => aR_Grb2_ppGarem_pShp2; k5*aR_Grb2_ppGarem_Shp2 - k_5*aR_Grb2_ppGarem_pShp2;
end
