// SBML level 3 version 2

function a(t)
  0.04166303 - 2*1.151965e-19*(t - 0) - 3*3.701181e-7*(t - 0)^2;
end

function b(t)
  0.02567393 - 2*0.0001332425*(t - 120) + 3*3.170258e-7*(t - 120)^2;
end

function c(t)
  0.007391239 - 2*1.911325e-5*(t - 240) + 3*1.057989e-8*(t - 240)^2;
end

function d(t)
  0.003261111 - 2*1.530449e-5*(t - 360) + 3*2.838616e-8*(t - 360)^2;
end

function x(t)
  0.01826339 + 3*6.851438e-8*(t - 0)^2;
end

function y(t)
  0.02122321 + 2*2.466518e-5*(t - 120) - 3*2.847016e-7*(t - 120)^2;
end

function z(t)
  0.01484375 - 2*7.782738e-5*(t - 240) + 3*1.038566e-7*(t - 240)^2;
end

function w(t)
  0.0006517857 - 2*4.043899e-5*(t - 360) + 3*1.123305e-7*(t - 360)^2;
end

model GAREM_module()

  // Compartments:
  compartment default_compartment = 1;
  compartment cell = 1;
  compartment extra = 1;
  compartment intra = 1;

  // Species:
  species Garem in cell = 0;
  species pGarem in cell = 0;
  species aRtot in cell = 0;
  species Grb2 in cell = 0;
  species Shp2 in cell = 3.5/cell;
  species Grb2_Garem in cell = 15.51/cell;
  species Grb2_pGarem in cell = 0;
  species Grb2_ppGarem in cell = 0;
  species Grb2_ppGarem_Shp2 in cell = 0;
  species Grb2_ppGarem_pShp2 in cell = 0;
  species aRtot_Grb2_pGarem in cell = 0;
  species aRtot_Grb2_Garem in default_compartment = 0;
  species aRtot_Grb2_ppGarem in default_compartment = 0.96/default_compartment;
  species aRtot_Grb2_ppGarem_Shp2 in default_compartment = 0;
  species aRtot_Grb2_ppGarem_pShp2 in default_compartment = 0;

  // Parameters:
  k2 = 4.684506;
  k_2 = 0.6026726;
  k3 = 0.5461782;
  k4 = 0.1506108;
  k7 = 0.000687685;
  k_7 = 0.01865465;
  k8 = 1.423637e-6;

  // Reactions:
  J0: -> aRtot; piecewise(a(time), time <= 120, b(time), time <= 240, c(time), time <= 360, d(time), time <= 480);
  J1: -> Shp2; piecewise(x(time), time <= 120, y(time), time <= 240, z(time), time <= 360, w(time), time <= 480);
  J2: aRtot + Grb2_Garem => aRtot_Grb2_Garem; k2*aRtot*Grb2_Garem - k_2*aRtot_Grb2_Garem;
  J3: aRtot_Grb2_Garem => aRtot_Grb2_pGarem; k3*aRtot_Grb2_Garem;
  J4: aRtot_Grb2_pGarem => aRtot_Grb2_ppGarem; k4*aRtot_Grb2_pGarem;
  J7: aRtot_Grb2_ppGarem + Shp2 => aRtot_Grb2_ppGarem_Shp2; k7*aRtot_Grb2_ppGarem*Shp2 - k_7*aRtot_Grb2_ppGarem_Shp2;
  J8: aRtot_Grb2_ppGarem_Shp2 => aRtot_Grb2_ppGarem_pShp2; k8*aRtot_Grb2_ppGarem_Shp2;
end
