// SBML level 3 version 2

function ras(t)
  12.69798 - 2*1.9101*t + 3*0.08355*t^2;
end

model RAF_activation()

  // Compartments:
  compartment default_compartment = 1;

  // Species:
  species RAS in default_compartment = 0;
  species ppRAF_d1433b_MEK in default_compartment = 15.4/default_compartment;
  species RASu_ppRAF_d1433b_MEK in default_compartment = 0;
  species RASu_ppRAF_d1433u_MEK in default_compartment = 0;
  species RASb_ppRAF_d1433u_MEK in default_compartment = 0;
  species MRAS_SHOC2_PP1C in default_compartment = 15/default_compartment;
  species MRAS_SHOC2_PP1C_RASb_ppRAF_d1433u_MEK in default_compartment = 0;
  species RASb_pRAF_d1433u_MEK in default_compartment = 0;
  species RAFa_MEK in default_compartment = 0;
  species RAFa_pMEK in default_compartment = 0;
  species RAFa_ppMEK in default_compartment = 0;
  species ERK in default_compartment = 153/default_compartment;
  species pERK in default_compartment = 0;
  species ppERK in default_compartment = 0;
  species RAFa_ppMEK_ERK in default_compartment = 0;
  species RAFa_ppMEK_pERK in default_compartment = 0;

  // Parameters:
  k1 = 1;
  k_1 = 1;
  k2 = 1;
  k_2 = 1;
  k3 = 1;
  k_3 = 1;
  k4 = 1;
  k_4 = 1;
  k5 = 1;
  k_5 = 1;
  k6 = 1;
  k7 = 1;
  k_7 = 1;
  k8 = 1;
  k_8 = 1;
  k9 = 1;
  k_9 = 1;
  k10 = 1;
  k11 = 1;
  k_11 = 1;
  k12 = 1;
  k13 = 1;
  k14 = 1;

  // Reactions:
  J0: -> RAS; ras(time);
  J1: RAS + ppRAF_d1433b_MEK -> RASu_ppRAF_d1433b_MEK; k1*RAS*ppRAF_d1433b_MEK - k_1*RASu_ppRAF_d1433b_MEK;
  J2: RASu_ppRAF_d1433b_MEK -> RASu_ppRAF_d1433u_MEK; k2*RASu_ppRAF_d1433b_MEK - k_2*RASu_ppRAF_d1433u_MEK;
  J3: RASu_ppRAF_d1433u_MEK -> RASb_ppRAF_d1433u_MEK; k3*RASu_ppRAF_d1433u_MEK - k_3*RASb_ppRAF_d1433u_MEK;
  J4: MRAS_SHOC2_PP1C + RASb_ppRAF_d1433u_MEK -> MRAS_SHOC2_PP1C_RASb_ppRAF_d1433u_MEK; k4*MRAS_SHOC2_PP1C*RASb_ppRAF_d1433u_MEK - k_4*MRAS_SHOC2_PP1C_RASb_ppRAF_d1433u_MEK;
  J5: MRAS_SHOC2_PP1C_RASb_ppRAF_d1433u_MEK -> MRAS_SHOC2_PP1C + RASb_pRAF_d1433u_MEK; k5*MRAS_SHOC2_PP1C_RASb_ppRAF_d1433u_MEK - k_5*RASb_ppRAF_d1433u_MEK;  // modifiers: RASb_ppRAF_d1433u_MEK
  J6: 2 RASb_pRAF_d1433u_MEK -> RAFa_MEK; k6*RASb_pRAF_d1433u_MEK^2;
  J7: RAFa_MEK -> RAFa_pMEK; k7*RAFa_MEK - k_7*RAFa_pMEK;
  J8: RAFa_pMEK -> RAFa_ppMEK; k8*RAFa_pMEK - k_8*RAFa_ppMEK;
  J9: RAFa_ppMEK + ERK -> RAFa_ppMEK_ERK; k9*RAFa_ppMEK*ERK - k_9*RAFa_ppMEK_ERK;
  J10: RAFa_ppMEK_ERK -> RAFa_ppMEK + pERK; k10*RAFa_ppMEK_ERK;
  J11: RAFa_ppMEK + pERK -> RAFa_ppMEK_pERK; k11*RAFa_ppMEK*pERK - k_11*RAFa_ppMEK_pERK;
  J12: RAFa_ppMEK_pERK -> RAFa_ppMEK + ppERK; k12*RAFa_ppMEK_pERK;
  J13: pERK -> ERK; k13*pERK;
  J14: ppERK -> pERK; k14*ppERK;
end
