// SBML level 3 version 2

function a(t)
  0.08728349 + 2*(-2.30393e-19)*(t - 0) + 3*4.317019e-7*(t - 0)^2;
end

function b(t)
  0.105933 + 2*0.0001554127*(t - 120) + 3*(-2.476796e-6)*(t - 120)^2;
end

function c(t)
  0.03623445 + 2*(-0.0007362341)*(t - 240) + 3*2.970854e-6*(t - 240)^2;
end

function d(t)
  -0.01212081 + 2*0.0003332735*(t - 360) + 3*(-1.67514e-6)*(t - 360)^2;
end

function f(t)
  -0.004501196 + 2*(-0.0002697767)*(t - 480) + 3*7.493798e-7*(t - 480)^2;
end

function g(t)
  -2.210845;
end

model RAS_module()
  // model units - substance: substance, time: time_unit

  // Compartments:
  compartment cell = 1;
  compartment extra = 5000;
  compartment intra = 1;

  // Species:
  species Ad1_Grb2_SOS1 in cell = 0;
  species Ad2_Grb2_SOS1 in cell = 0;
  species Ad3_Grb2_SOS1 in cell = 0;
  species Ras in cell = 141.65/cell;
  species aRas in cell = 2.7/cell;
  species Rasa1 in cell = 98/cell;

  // Parameters:
  k13 = 1.146031;
  k14 = 1.455781;

  // Assignment rules:
  aSOS := Ad1_Grb2_SOS1 + Ad2_Grb2_SOS1 + Ad3_Grb2_SOS1;

  // Reactions:
  F0: -> Ad1_Grb2_SOS1; 0.25*piecewise(a(time), time <= 120, b(time), time <= 240, c(time), time <= 360, d(time), time <= 480, f(time), time <= 600, g(time), time <= 720);
  F1: -> Ad2_Grb2_SOS1; 0.5*piecewise(a(time), time <= 120, b(time), time <= 240, c(time), time <= 360, d(time), time <= 480, f(time), time <= 600, g(time), time <= 720);
  F2: -> Ad3_Grb2_SOS1; 0.25*piecewise(a(time), time <= 120, b(time), time <= 240, c(time), time <= 360, d(time), time <= 480, f(time), time <= 600, g(time), time <= 720);
  J1: Ad1_Grb2_SOS1 + Ras => Ad1_Grb2_SOS1 + aRas; k13*Ad1_Grb2_SOS1*Ras;
  J2: Ad2_Grb2_SOS1 + Ras => Ad2_Grb2_SOS1 + aRas; k13*Ad2_Grb2_SOS1*Ras;
  J3: Ad3_Grb2_SOS1 + Ras => Ad3_Grb2_SOS1 + aRas; k13*Ad3_Grb2_SOS1*Ras;
  J4: aRas + Rasa1 => Ras + Rasa1; k14*aRas*Rasa1;

  // Unit definitions:
  unit substance = 1e-9 mole;
  unit time_unit = second;
  unit nM = 1e-9 mole / litre;
  unit per_nM = litre / (1e-9 mole);
  unit per_sec = 1 / second;
  unit nM_per_sec = 1e-9 mole / (litre * second);
  unit per_nMs = litre / (1e-9 mole * second);
end
