// SBML level 3 version 2

function x(t)
  0.01826339 + 3*6.851438e-8*(t - 0)^2;
end

function y(t)
  0.02122321 + 2*2.466518e-5*(t - 120) - 3*2.847016e-7*(t - 120)^2;
end

function z(t)
  0.01484375 - 2*7.782738e-5*(t - 240) + 3*1.038566e-7*(t - 240)^2;
end

function w(t)
  0.0006517857 - 2*4.043899e-5*(t - 360) + 3*1.123305e-7*(t - 360)^2;
end

model EGFR_combined()
  // model units - substance: substance, time: time_unit

  // Compartments:
  compartment default_compartment = 1;
  compartment cell = 1;
  compartment extra = 5000; extra is "extracellular space";
  compartment intra = 1;

  // Species:
  species Lig in extra = 825/extra;
  species Egfr in cell = 124/cell;
  species iEgfr in intra = 67/intra;
  species Egfr_Lig in cell = 2/cell;
  species iEgfr_Lig in intra = 1/intra;
  species pEgfr_Lig in cell = 0;
  species ipEgfr_Lig in intra = 0;
  species aRtot in cell;
  species Garem in cell = 1/cell;
  species pGarem in cell = 0;
  species Grb2 in cell = 37.11/cell;
  species Shp2 in cell = 28.5/cell;
  species Grb2_Garem in cell = 3/cell;
  species Grb2_pGarem in cell = 0;
  species Grb2_ppGarem in cell = 0;
  species Grb2_ppGarem_Shp2 in cell = 0;
  species Grb2_ppGarem_pShp2 in cell = 0;
  species aR_Grb2_pGarem in cell = 0.1/cell;
  species Shc1 in cell = 28/cell;
  species pShc1 in cell = 0;
  species ipShc1 in cell = 0;
  species iShc1 in cell = 0;
  species Gab1 in cell = 1/cell;
  species pGab1 in cell = 0;
  species peGab1 in cell = 0;
  species Grb2_Gab1 in cell = 4/cell;
  species Grb2_pGab1 in cell = 0;
  species Grb2_ppGab1 in cell = 0;
  species Grb2_ppGab1_Shp2 in cell = 0;
  species Grb2_ppGab1_pShp2 in cell = 0;
  species aR_Grb2_Garem in default_compartment = 0.1/default_compartment;
  species aR_Grb2_ppGarem in default_compartment = 0.08/default_compartment;
  species aR_Grb2_ppGarem_Shp2 in default_compartment = 0.1/default_compartment;
  species aR_Grb2_ppGarem_pShp2 in default_compartment = 0.18/default_compartment;
  species aR_Grb2_Gab1 in default_compartment = 0.1/default_compartment;
  species aR_Grb2_pGab1 in default_compartment = 0.1/default_compartment;
  species aR_Grb2_ppGab1 in default_compartment = 0.17/default_compartment;
  species aR_Grb2_ppGab1_Shp2 in default_compartment = 0.1/default_compartment;
  species aR_Grb2_ppGab1_pShp2 in default_compartment = 0.4/default_compartment;
  species aR_Shc1 in default_compartment = 1/default_compartment;
  species aR_pShc1 in default_compartment = 0.74/default_compartment;

  // Parameters:
  Vr = 0.242;
  kt = 0.0012;
  kx = 1;
  kf = 0.01597934;
  kr = 0.008759856;
  ke = 0.0037;
  kh = 0.0004;
  kp = 0.02689839;
  k_p = 0.13;
  k1 = 0.0001;
  k_1 = 0.000138;
  k2 = 9.834513;
  k_2 = 2.564005e-5;
  k3 = 9.660377;
  k_3 = 8.958567;
  k4 = 0.001827095;
  k_4 = 0.008355006;
  k5 = 0.067;
  k_5 = 0.13;
  k7 = 0.0001;
  k_7 = 0.000138;
  k8 = 0.006015991;
  k_8 = 0.0317694;
  k6 = 0.7859421;
  k_6 = 9.93221;

  // Assignment rules:
  aRtot := pEgfr_Lig + ipEgfr_Lig;

  // Reactions:
  J1: => Egfr; Vr;
  J2: Egfr => iEgfr; kt*Egfr;
  J3: iEgfr => ; kx*iEgfr;
  J4: Egfr -> Egfr_Lig; kf*Egfr*Lig - kr*Egfr_Lig;  // modifiers: Lig
  J5: Egfr_Lig => iEgfr_Lig; ke*Egfr_Lig;
  J6: iEgfr_Lig => ; kh*iEgfr_Lig;
  J7: Egfr_Lig -> pEgfr_Lig; kp*Egfr_Lig - k_p*pEgfr_Lig;
  J8: pEgfr_Lig => ipEgfr_Lig; ke*pEgfr_Lig;
  J9: ipEgfr_Lig => ; kh*ipEgfr_Lig;
  J10: Garem + Grb2 -> Grb2_Garem; k1*Garem*Grb2 - k_1*Grb2_Garem;
  J11: pEgfr_Lig + Grb2_Garem -> aR_Grb2_Garem; k2*pEgfr_Lig*Grb2_Garem - k_2*aR_Grb2_Garem;
  J13: aR_Grb2_Garem -> aR_Grb2_pGarem; k3*aR_Grb2_Garem - k_3*aR_Grb2_pGarem;
  J14: aR_Grb2_pGarem -> aR_Grb2_ppGarem; k3*aR_Grb2_pGarem - k_3*aR_Grb2_ppGarem;
  J15: aR_Grb2_ppGarem + Shp2 -> aR_Grb2_ppGarem_Shp2; k4*aR_Grb2_ppGarem*Shp2 - k_4*aR_Grb2_ppGarem_Shp2;
  J16: aR_Grb2_ppGarem_Shp2 -> aR_Grb2_ppGarem_pShp2; k5*aR_Grb2_ppGarem_Shp2 - k_5*aR_Grb2_ppGarem_pShp2;
  J19: Gab1 + Grb2 -> Grb2_Gab1; k7*Gab1*Grb2 - k_7*Grb2_Gab1;
  J20: pEgfr_Lig + Grb2_Gab1 -> aR_Grb2_Gab1; k8*pEgfr_Lig*Grb2_Gab1 - k_8*aR_Grb2_Gab1;
  J21: aR_Grb2_Gab1 -> aR_Grb2_pGab1; k3*aR_Grb2_Gab1 - k_3*aR_Grb2_pGab1;
  J22: aR_Grb2_pGab1 -> aR_Grb2_ppGab1; k3*aR_Grb2_pGab1 - k_3*aR_Grb2_ppGab1;
  J23: aR_Grb2_ppGab1 + Shp2 -> aR_Grb2_ppGab1_Shp2; k8*aR_Grb2_ppGab1*Shp2 - k_8*aR_Grb2_ppGab1_Shp2;
  J24: aR_Grb2_ppGab1_Shp2 -> aR_Grb2_ppGab1_pShp2; k5*aR_Grb2_ppGab1_Shp2 - k_5*aR_Grb2_ppGab1_pShp2;
  J17: pEgfr_Lig + Shc1 -> aR_Shc1; k6*pEgfr_Lig*Shc1 - k_6*aR_Shc1;
  J18: aR_Shc1 -> aR_pShc1; k3*aR_Shc1 - k_3*aR_pShc1;

  // Unit definitions:
  unit nM = 1e-9 mole / litre;
  unit substance = 1e-9 mole; substance is "nmole";
  unit time_unit = second; time_unit is "s";
  unit per_nM = litre / (1e-9 mole);
  unit per_sec = 1 / second; per_sec is "s-1";
  unit nM_per_s = 1e-9 mole / (litre * second); nM_per_s is "nM/s";
  unit per_nMs = litre / (1e-9 mole * second); per_nMs is "nM-1 s-1";
end
