// SBML level 3 version 2

function a(t)
  2.499782 - 3*0.07994551*(t - 0)^2;
end

function b(t)
  1.540436 - 2*0.4796731*(t - 2) + 3*0.06847756*(t - 2)^2;
end

function c(t)
  0.4434744 - 2*0.06880769*(t - 4) + 3*0.002285256*(t - 4)^2;
end

function d(t)
  0.1956667 - 2*0.05509615*(t - 6) + 3*0.00613141*(t - 6)^2;
end

model SHC_module()
  // model units - substance: substance, time: time_unit

  // Compartments:
  compartment default_compartment = 1;
  compartment cell = 1;
  compartment extra = 1; extra is "extracellular space";
  compartment intra = 1;

  // Species:
  species Shc1 in default_compartment = 28.564/default_compartment;
  species pShc1 in default_compartment = 0.74/default_compartment;
  species ipShc1 in cell = 0;
  species iShc1 in cell = 0;
  species aRtot in cell = 0;
  species $Shc1Ihtr in cell = 1;
  species shc_phos in default_compartment = 1/default_compartment;

  // Parameters:
  kcat1 = 2.297136;
  kcat4 = 60.33834;

  // Reactions:
  J0: -> aRtot; piecewise(a(time), time <= 2, b(time), time <= 4, c(time), time <= 6, d(time), time <= 8);
  J1: aRtot + Shc1 -> aRtot + pShc1; kcat1*aRtot*Shc1;
  J4: shc_phos + pShc1 -> shc_phos + Shc1; kcat4*shc_phos*pShc1;

  // Unit definitions:
  unit nM = 1e-9 mole / litre;
  unit substance = 1e-9 mole; substance is "nmole";
  unit time_unit = second; time_unit is "s";
  unit per_nM = litre / (1e-9 mole);
  unit per_sec = 1 / second; per_sec is "s-1";
  unit nM_per_sec = 1e-9 mole / (litre * second); nM_per_sec is "nM/s";
  unit per_nMs = litre / (1e-9 mole * second); per_nMs is "nM-1 s-1";
end
