// SBML level 3 version 2

function a(t)
  0.04166303 - 2*1.151965e-19*(t - 0) - 3*3.701181e-7*(t - 0)^2;
end

function b(t)
  0.02567393 - 2*0.0001332425*(t - 120) + 3*3.170258e-7*(t - 120)^2;
end

function c(t)
  0.007391239 - 2*1.911325e-5*(t - 240) + 3*1.057989e-8*(t - 240)^2;
end

function d(t)
  0.003261111 - 2*1.530449e-5*(t - 360) + 3*2.838616e-8*(t - 360)^2;
end

model SHC_module()
  // model units - substance: substance, time: time_unit

  // Compartments:
  compartment default_compartment = 1;
  compartment cell = 1;
  compartment extra = 1; extra is "extracellular space";
  compartment intra = 1;

  // Species:
  species Shc1 in default_compartment = 28.564/default_compartment;
  species pShc1 in default_compartment = 0;
  species ipShc1 in cell = 0;
  species iShc1 in cell = 0;
  species aRtot in cell = 0;
  species $Shc1Ihtr in cell = 0;
  species aRtot_Shc1 in default_compartment = 0;
  species aRtot_pShc1 in default_compartment = 0.74/default_compartment;

  // Parameters:
  k1 = 9.235264;
  k_1 = 0.000281208;
  k2 = 9.97492;
  k_2 = 2.443285;

  // Reactions:
  J0: -> aRtot; piecewise(a(time), time <= 120, b(time), time <= 240, c(time), time <= 360, d(time), time <= 480);
  J1: aRtot + Shc1 -> aRtot_Shc1; k1*aRtot*Shc1 - k_1*aRtot_Shc1;
  J2: aRtot_Shc1 -> aRtot_pShc1; k2*aRtot_Shc1 - k_2*aRtot_pShc1;

  // Unit definitions:
  unit nM = 1e-9 mole / litre;
  unit substance = 1e-9 mole; substance is "nmole";
  unit time_unit = second; time_unit is "s";
  unit per_nM = litre / (1e-9 mole);
  unit per_sec = 1 / second; per_sec is "s-1";
  unit nM_per_sec = 1e-9 mole / (litre * second); nM_per_sec is "nM/s";
  unit per_nMs = litre / (1e-9 mole * second); per_nMs is "nM-1 s-1";
end
