// SBML level 3 version 2

function a1(t)
  1*(0.03648214 - 2*1.151965e-19*(t - 0) - 3*4.212136e-7*(t - 0)^2);
end

function b1(t)
  1*(0.01828571 - 2*0.0001516369*(t - 120) + 3*4.741237e-7*(t - 120)^2);
end

function c1(t)
  1*(0.002375 + 2*1.904762e-5*(t - 240) - 3*4.588294e-8*(t - 240)^2);
end

function d1(t)
  1*(0.004964286 + 2*2.529762e-6*(t - 360) - 3*7.027116e-9*(t - 360)^2);
end

function f1(t)
  1*0.005267842;
end

function a2(t)
  1*(0.03411458 + 2*8.131516e-20*(t - 0) - 3*3.667535e-7*(t - 0)^2);
end

function b2(t)
  1*(0.01827083 - 2*0.00013203125*(t - 120) + 3*4.448785e-7*(t - 120)^2);
end

function c2(t)
  1*(0.005802083 + 2*2.8125e-5*(t - 240) - 3*1.859086e-7*(t - 240)^2);
end

function d2(t)
  1*(0.004520833 - 2*3.880208e-5*(t - 360) + 3*1.077836e-7*(t - 360)^2);
end

function f2(t)
  1*(-0.0001351828);
end

function a3(t)
  1*(0.00222619 + 3*1.901455e-8*(t - 0)^2);
end

function b3(t)
  1*(0.003047619 + 2*6.845238e-6*(t - 120) - 3*7.771164e-8*(t - 120)^2);
end

function c3(t)
  1*(0.001333333 - 2*2.113095e-5*(t - 240) + 3*7.771164e-8*(t - 240)^2);
end

function d3(t)
  1*(-0.0003809524 + 2*6.845238e-6*(t - 360) - 3*1.901455e-8*(t - 360)^2);
end

function f3(t)
  1*0.0004404349;
end

function x(t)
  -0.02767758 + 3*1.974137e-6*(t - 0)^2;
end

function y(t)
  0.05760516 + 2*0.0007106895*(t - 120) - 3*2.56166e-6*(t - 120)^2;
end

function z(t)
  0.1175069 - 2*0.0002115079*(t - 240) + 3*8.766672e-9*(t - 240)^2;
end

function w(t)
  0.01749802 - 2*0.0002051959*(t - 480) + 3*2.849944e-7*(t - 480)^2;
end

model SOS_module()
  // model units - substance: substance, time: time_unit

  // Compartments:
  compartment default_compartment = 1;
  compartment cell = 1;
  compartment extra = 5000;
  compartment intra = 1;

  // Species:
  species aR_Grb2_ppGab1_pShp2 in cell = 0;
  species aR_Grb2_ppGarem_pShp2 in cell = 0;
  species aR_pShc1 in cell = 0;
  species Grb2 in cell = 37.11/cell;
  species SOS1 in cell = 0.07/cell;
  species Grb2_SOS1 in cell = 3.98/cell;
  species Grb2_pSOS1 in cell = 0;
  species Grb2_ipSOS1 in cell = 0;
  species Ad1_Grb2_SOS1 in cell = 0.5/cell;
  species iAd1_Grb2_SOS1 in cell = 0.2/cell;
  species iaR_Grb2_ppGarem_pShp2 in cell = 0.05/cell;
  species Ad2_Grb2_SOS1 in cell = 0.5/cell;
  species iAd2_Grb2_SOS1 in cell = 0.2/cell;
  species iaR_Grb2_ppGab1_pShp2 in cell = 0.05/cell;
  species Ad3_Grb2_SOS1 in cell = 0.5/cell;
  species iAd3_Grb2_SOS1 in cell = 0.2/cell;
  species iaR_pShc1 in cell = 0.5/cell;
  species ipEgfr_Lig in default_compartment = 0;
  species Shp2 in default_compartment = 0;
  species Grb2_Garem in default_compartment = 0;
  species Grb2_Gab1 in default_compartment = 0;
  species Shc1 in default_compartment = 0;
  species aSOS in default_compartment = 0;
  species aAdptrTot in default_compartment;
  species Ras in default_compartment = 141.65/default_compartment;
  species aRas in default_compartment = 2.7/default_compartment;
  species Rasa1 in default_compartment = 98/default_compartment;
  species aRSK in default_compartment = 2/default_compartment;
  species pSOS1 in default_compartment = 0.01/default_compartment;

  // Parameters:
  k9 = 0.6117784;
  k_9 = 0.4014488;
  k11 = 0.6130563;
  k12 = 0.8130189;
  k10 = 0.2207355;
  k_10 = 0.2673959;
  ke = 0.001216709;
  kr = 0.4199778;
  kr2 = 0.776275;
  k13 = 1.550059;
  k14 = 0.421956;

  // Assignment rules:
  aAdptrTot := aR_Grb2_ppGab1_pShp2 + aR_Grb2_ppGarem_pShp2 + aR_pShc1;

  // Reactions:
  F1: -> aR_Grb2_ppGarem_pShp2; piecewise(a1(time), time <= 120, b1(time), time <= 240, c1(time), time <= 360, d1(time), time <= 480, f1(time), time <= 600);
  F2: -> aR_pShc1; piecewise(a2(time), time <= 120, b2(time), time <= 240, c2(time), time <= 360, d2(time), time <= 480, f2(time), time <= 600);
  F3: -> aR_Grb2_ppGab1_pShp2; piecewise(a3(time), time <= 120, b3(time), time <= 240, c3(time), time <= 360, d3(time), time <= 480, f3(time), time <= 600);
  F4: -> aRSK; piecewise(x(time), time <= 120, y(time), time <= 240, z(time), time <= 480, w(time), time <= 720);
  J1: Ad1_Grb2_SOS1 + Ras => Ad1_Grb2_SOS1 + aRas; k13*Ad1_Grb2_SOS1*Ras;
  J2: Ad2_Grb2_SOS1 + Ras => Ad2_Grb2_SOS1 + aRas; k13*Ad2_Grb2_SOS1*Ras;
  J3: Ad3_Grb2_SOS1 + Ras => Ad3_Grb2_SOS1 + aRas; k13*Ad3_Grb2_SOS1*Ras;
  J4: aRas + Rasa1 => Ras + Rasa1; k14*aRas*Rasa1;
  J5: Ad1_Grb2_SOS1 => iAd1_Grb2_SOS1; ke*Ad1_Grb2_SOS1;
  J6: iAd1_Grb2_SOS1 => Grb2_SOS1 + iaR_Grb2_ppGarem_pShp2; kr*iAd1_Grb2_SOS1;
  J7: iaR_Grb2_ppGarem_pShp2 => ipEgfr_Lig + Grb2_Garem + Shp2; kr2*iaR_Grb2_ppGarem_pShp2;
  J8: aR_Grb2_ppGab1_pShp2 + Grb2_SOS1 -> Ad2_Grb2_SOS1; k10*aR_Grb2_ppGab1_pShp2*Grb2_SOS1 - k_10*Ad2_Grb2_SOS1;
  J9: Ad2_Grb2_SOS1 => iAd2_Grb2_SOS1; ke*Ad2_Grb2_SOS1;
  J10: iAd2_Grb2_SOS1 => Grb2_SOS1 + iaR_Grb2_ppGab1_pShp2; kr*iAd2_Grb2_SOS1;
  J11: iaR_Grb2_ppGab1_pShp2 => ipEgfr_Lig + Grb2_Gab1 + Shp2; kr2*iaR_Grb2_ppGab1_pShp2;
  J12: aR_pShc1 + Grb2_SOS1 -> Ad3_Grb2_SOS1; k10*aR_pShc1*Grb2_SOS1 - k_10*Ad3_Grb2_SOS1;
  J13: Ad3_Grb2_SOS1 => iAd3_Grb2_SOS1; ke*Ad3_Grb2_SOS1;
  J14: iAd3_Grb2_SOS1 => Grb2_SOS1 + iaR_pShc1; kr*iAd3_Grb2_SOS1;
  J15: iaR_pShc1 => ipEgfr_Lig + Shc1; kr2*iaR_pShc1;

  // Unit definitions:
  unit substance = 1e-9 mole;
  unit time_unit = second;
  unit nM = 1e-9 mole / litre;
  unit per_nM = litre / (1e-9 mole);
  unit per_sec = 1 / second;
  unit nM_per_sec = 1e-9 mole / (litre * second);
  unit per_nMs = litre / (1e-9 mole * second);
end
