// SBML level 3 version 2

function a(t)
  6.869375 - 2*1.332268e-15*(t - 0) - 3*0.24609375*(t - 0)^2;
end

function b(t)
  3.91625 - 2*1.4765625*(t - 2) + 3*0.25046875*(t - 2)^2;
end

function c(t)
  1.015625 + 2*0.02625*(t - 4) - 3*0.03203125*(t - 4)^2;
end

function d(t)
  0.73625 - 2*0.1659375*(t - 6) + 3*0.02765625*(t - 6)^2;
end

function f(t)
  0.4046516;
end

model SOS_module()
  // model units - substance: substance, time: time_unit

  // Compartments:
  compartment default_compartment = 1;
  compartment cell = 1;
  compartment extra = 5000;
  compartment intra = 1;

  // Species:
  species Gab1_pShp2 in default_compartment = 0;
  species Garem_pShp2 in default_compartment = 0;
  species pShc1 in default_compartment = 0;
  species $aRtot in default_compartment = 0;
  species $Sos1Ihtr in cell = 1;
  species Grb2 in cell = 0;
  species SOS1 in default_compartment = 0;
  species Grb2_SOS1 in default_compartment = 6.2/default_compartment;
  species Grb2_pSOS1 in default_compartment = 0;
  species Grb2_ipSOS1 in cell = 0;
  species aAdptrTot in default_compartment = 2.06/default_compartment;
  species dRas in default_compartment = 98/default_compartment;
  species tRas in default_compartment = 0;

  // Parameters:
  kcat2 = 0.7527112;
  Km2 = 2.178566;
  kcat3 = 4.645821;
  Km3 = 2.985334;
  ktRas = 3.97703;
  KmRasd = 0.1006302;
  kdRas = 0.7515374;
  GAP = 1;
  KmRast = 0.6018802;

  // Assignment rules:
  aSOS := Grb2_pSOS1;

  // Reactions:
  J0: -> aAdptrTot; piecewise(a(time), time <= 2, b(time), time <= 4, c(time), time <= 6, d(time), time <= 8, f(time), time <= 10);
  J2: aAdptrTot + Grb2_SOS1 -> aAdptrTot + Grb2_pSOS1; kcat2*aAdptrTot*Grb2_SOS1/(Km2 + Grb2_SOS1);
  J3: $Sos1Ihtr + Grb2_pSOS1 -> $Sos1Ihtr + Grb2_ipSOS1; kcat3*Sos1Ihtr*Grb2_pSOS1/(Km3 + Grb2_pSOS1);
  J5: dRas => tRas; ktRas*dRas*aSOS/(KmRasd + dRas);
  J6: tRas => dRas; kdRas*tRas*GAP/(KmRast + tRas);

  // Unit definitions:
  unit substance = 1e-9 mole;
  unit time_unit = second;
  unit nM = 1e-9 mole / litre;
  unit per_nM = litre / (1e-9 mole);
  unit per_sec = 1 / second;
  unit nM_per_sec = 1e-9 mole / (litre * second);
  unit per_nMs = litre / (1e-9 mole * second);
end
