// SBML level 3 version 2

function a(t)
  0.07279613 - 2*1.219727e-19*(t - 0) - 3*7.670924e-7*(t - 0)^2;
end

function b(t)
  0.03965774 - 2*0.0002761533*(t - 120) + 3*8.37777e-7*(t - 120)^2;
end

function c(t)
  0.009572917 + 2*2.544643e-5*(t - 240) - 3*1.534598e-7*(t - 240)^2;
end

function d(t)
  0.009050595 - 2*2.979911e-5*(t - 360) + 3*8.27753e-8*(t - 360)^2;
end

function f(t)
  0.005474882;
end

model SOS_module()
  // model units - substance: substance, time: time_unit

  // Compartments:
  compartment default_compartment = 1;
  compartment cell = 1;
  compartment extra = 5000;
  compartment intra = 1;

  // Species:
  species Gab1_pShp2 in default_compartment = 0;
  species Garem_pShp2 in default_compartment = 0;
  species pShc1 in default_compartment = 0;
  species $aRtot in default_compartment = 0;
  species $Sos1Ihtr in cell = 1;
  species Grb2 in cell = 0;
  species SOS1 in default_compartment = 0;
  species Grb2_SOS1 in default_compartment = 6.2/default_compartment;
  species Grb2_pSOS1 in default_compartment = 0;
  species Grb2_ipSOS1 in cell = 0;
  species aAdptrTot in default_compartment = 0;
  species dRas in default_compartment = 98/default_compartment;
  species tRas in default_compartment = 0;

  // Parameters:
  k2 = 0.002966032;
  k5 = 0.001044638;
  k6 = 0.02436035;
  GAP = 1;
  k3 = 0.3613944;

  // Assignment rules:
  aSOS := Grb2_pSOS1;

  // Reactions:
  J0: -> aAdptrTot; piecewise(a(time), time <= 120, b(time), time <= 240, c(time), time <= 360, d(time), time <= 480, f(time), time <= 600);
  J2: aAdptrTot + Grb2_SOS1 -> aAdptrTot + Grb2_pSOS1; k2*aAdptrTot*Grb2_SOS1;
  J5: dRas => tRas; k5*dRas*aSOS;
  J6: tRas => dRas; k6*tRas*GAP;

  // Unit definitions:
  unit substance = 1e-9 mole;
  unit time_unit = second;
  unit nM = 1e-9 mole / litre;
  unit per_nM = litre / (1e-9 mole);
  unit per_sec = 1 / second;
  unit nM_per_sec = 1e-9 mole / (litre * second);
  unit per_nMs = litre / (1e-9 mole * second);
end
