// SBML level 3 version 2

function a(t)
  5.23701 + 2*4.440892e-16*(t - 0) + 3*0.09324761*(t - 0)^2;
end

function b(t)
  6.355981 + 2*0.5594856*(t - 2) - 3*0.534988*(t - 2)^2;
end

function c(t)
  2.174067 - 2*2.650443*(t - 4) + 3*0.6417045*(t - 4)^2;
end

function d(t)
  -0.7272488 + 2*1.199785*(t - 6) - 3*0.3618301*(t - 6)^2;
end

function f(t)
  -0.2700718 - 2*0.9711962*(t - 8) + 3*0.161866*(t - 8)^2;
end

function g(t)
  -2.210845;
end

model RAF_activation()

  // Compartments:
  compartment default_compartment = 1;

  // Species:
  species RAS in default_compartment = 0;
  species ppRAF_d1433b in default_compartment = 15.4/default_compartment;
  species RASu_ppRAF_d1433b in default_compartment = 0;
  species RASu_ppRAF_d1433u in default_compartment = 0;
  species RASb_ppRAF_d1433u in default_compartment = 0;
  species MRAS_SHOC2_PP1C in default_compartment = 15/default_compartment;
  species MRAS_SHOC2_PP1C_RASb_ppRAF_d1433u in default_compartment = 0;
  species RASb_pRAF_d1433u in default_compartment = 0;
  species RAFa in default_compartment = 0;
  species RAFa_MEK in default_compartment = 0;
  species RAFa_pMEK in default_compartment = 0;
  species RAFa_ppMEK in default_compartment = 0;
  species ERK in default_compartment = 153/default_compartment;
  species pERK in default_compartment = 0;
  species ppERK in default_compartment = 0;
  species mek_phos in default_compartment = 100/default_compartment;
  species MEK in default_compartment = 153/default_compartment;
  species RAFa_ppMEK_ERK in default_compartment = 0;
  species RAFa_ppMEK_pERK in default_compartment = 0;

  // Parameters:
  k1 = 9.132132;
  k_1 = 0.0001055094;
  k2 = 0.2279762;
  k_2 = 0.0006778575;
  k3 = 7450.141;
  k_3 = 0.8919156;
  k4 = 1409.525;
  k_4 = 5409.931;
  k5 = 5346.173;
  k_5 = 0.003783427;
  k6 = 7116.823;
  k_6 = 4652.386;
  k7 = 0.01438839;
  k_7 = 1828.964;
  k71 = 8199.159;
  k_71 = 45.641;
  k8 = 9566.454;
  k_8 = 0.006800313;
  k9 = 0.02334542;
  k_9 = 79.86987;
  k10 = 9554.514;
  k11 = 9863.461;
  k_11 = 0.149072;
  k12 = 1194.023;
  k13 = 0.01045431;
  k14 = 33.46498;
  k72 = 0.003124277;
  k81 = 0.02339067;
  k_81 = 64.6819;
  k82 = 3.729757;

  // Reactions:
  J0: -> RAS; piecewise(a(time), time <= 2, b(time), time <= 4, c(time), time <= 6, d(time), time <= 8, f(time), time <= 10, g(time), time <= 12);
  J1: RAS + ppRAF_d1433b -> RASu_ppRAF_d1433b; k1*RAS*ppRAF_d1433b - k_1*RASu_ppRAF_d1433b;
  J2: RASu_ppRAF_d1433b -> RASu_ppRAF_d1433u; k2*RASu_ppRAF_d1433b - k_2*RASu_ppRAF_d1433u;
  J3: RASu_ppRAF_d1433u -> RASb_ppRAF_d1433u; k3*RASu_ppRAF_d1433u - k_3*RASb_ppRAF_d1433u;
  J4: MRAS_SHOC2_PP1C + RASb_ppRAF_d1433u -> MRAS_SHOC2_PP1C_RASb_ppRAF_d1433u; k4*MRAS_SHOC2_PP1C*RASb_ppRAF_d1433u - k_4*MRAS_SHOC2_PP1C_RASb_ppRAF_d1433u;
  J5: MRAS_SHOC2_PP1C_RASb_ppRAF_d1433u -> MRAS_SHOC2_PP1C + RASb_pRAF_d1433u; k5*MRAS_SHOC2_PP1C_RASb_ppRAF_d1433u - k_5*RASb_ppRAF_d1433u;  // modifiers: RASb_ppRAF_d1433u
  J6: 2 RASb_pRAF_d1433u -> RAFa; k6*RASb_pRAF_d1433u^2 - k_6*RAFa;
  J7: RAFa + MEK -> RAFa_MEK; k7*RAFa*MEK - k_7*RAFa_MEK;
  J71: RAFa_MEK -> RAFa_pMEK; k71*RAFa_MEK - k_71*RAFa_pMEK;
  J8: RAFa_pMEK -> RAFa_ppMEK; k8*RAFa_pMEK - k_8*RAFa_ppMEK;
  J9: RAFa_ppMEK + ERK -> RAFa_ppMEK_ERK; k9*RAFa_ppMEK*ERK - k_9*RAFa_ppMEK_ERK;
  J10: RAFa_ppMEK_ERK -> RAFa_ppMEK + pERK; k10*RAFa_ppMEK_ERK;
  J11: RAFa_ppMEK + pERK -> RAFa_ppMEK_pERK; k11*RAFa_ppMEK*pERK - k_11*RAFa_ppMEK_pERK;
  J12: RAFa_ppMEK_pERK -> RAFa_ppMEK + ppERK; k12*RAFa_ppMEK_pERK;
  J13: pERK -> ERK; k13*pERK;
  J14: ppERK -> pERK; k14*ppERK;
end
