// SBML level 3 version 2

model EGFR_module()
  // model units - substance: substance, time: time_unit

  // Compartments:
  compartment default_compartment = 1;
  compartment cell = 1;
  compartment extra = 5000; extra is "extracellular space";
  compartment intra = 1;

  // Species:
  species Tgfa in default_compartment = 5000/default_compartment;
  species Hbegf in default_compartment = 0;
  species Ar in default_compartment = 0;
  species Epgn in extra = 0;
  species Egfr in cell = 208/cell;
  species iEgfr in intra = 0;
  species Egfr_Tgfa in cell = 0;
  species iR_Tgfa in intra = 0;
  species pEgfr_Tgfa in cell = 0;
  species ipEgfr_Tgfa in intra = 0;
  species Egfr_Hbegf in cell = 0;
  species iR_Hbegf in intra = 0;
  species pEgfr_Hbegf in cell = 0;
  species ipEgfr_Hbegf in intra = 0;
  species Egfr_Ar in cell = 0;
  species iR_Ar in intra = 0;
  species pEgfr_Ar in cell = 0;
  species ipEgfr_Ar in intra = 0;
  species Egfr_Epgn in cell = 0;
  species iR_Epgn in intra = 0;
  species pEgfr_Epgn in cell = 0;
  species ipEgfr_Epgn in intra = 0;
  species $aRtot in default_compartment;
  species iEgfr_Tgfa in default_compartment = 0;
  species iEgfr_Hbegf in default_compartment = 0;
  species iEgfr_Ar in default_compartment = 0;
  species iEgfr_Epgn in default_compartment = 0;

  // Parameters:
  Vr = 8.707065 nM_per_sec;
  kt = 0.1029357 per_sec;
  kx = 0.622679 per_sec;
  k4 = 0.9068893 per_nMs;
  k_4 = 0.8256102 per_sec;
  ke = 0.1908109 per_sec;
  kh = 0.1113965 per_sec;
  k7 = 0.1849415 per_sec;
  k_7 = 1.18163 per_sec;
  k10 = 0.1517431 per_nMs;
  k_10 = 0.9161456 per_sec;
  k13 = 1.205854 per_sec;
  k_13 = 4.225662 per_sec;
  k16 = 0.2048025 per_nMs;
  k_16 = 4.523037 per_sec;
  k19 = 0.5518188 per_sec;
  k_19 = 0.9010387 per_sec;
  k22 = 0.2094671 per_nMs;
  k_22 = 5.158239 per_sec;
  k25 = 0.1191381 per_sec;
  k_25 = 0.5931387 per_sec;
  aR has nM;
  aRi has nM;

  // Assignment rules:
  aRtot := aR + aRi;
  aR := pEgfr_Tgfa + pEgfr_Hbegf + pEgfr_Ar + pEgfr_Epgn;
  aRi := ipEgfr_Tgfa + ipEgfr_Hbegf + ipEgfr_Ar + ipEgfr_Epgn;

  // Reactions:
  J1: => Egfr; Vr;
  J2: Egfr => iEgfr; kt*Egfr;
  J3: iEgfr => ; kx*iEgfr;
  J4: Egfr -> Egfr_Tgfa; k4*Egfr*0.165 - k_4*Egfr_Tgfa;
  J5: Egfr_Tgfa => iEgfr_Tgfa; ke*Egfr_Tgfa;
  J6: iEgfr_Tgfa => ; kh*iEgfr_Tgfa;
  J7: Egfr_Tgfa -> pEgfr_Tgfa; k7*Egfr_Tgfa - k_7*pEgfr_Tgfa;
  J8: pEgfr_Tgfa => ipEgfr_Tgfa; ke*pEgfr_Tgfa;
  J9: ipEgfr_Tgfa => ; kh*ipEgfr_Tgfa;
  J10: Egfr -> Egfr_Hbegf; k10*Egfr*0.165 - k_10*Egfr_Hbegf;
  J11: Egfr_Hbegf => iEgfr_Hbegf; ke*Egfr_Hbegf;
  J12: iEgfr_Hbegf => ; kh*iEgfr_Hbegf;
  J13: Egfr_Hbegf -> pEgfr_Hbegf; k13*Egfr_Hbegf - k_13*pEgfr_Hbegf;
  J14: pEgfr_Hbegf => ipEgfr_Hbegf; ke*pEgfr_Hbegf;
  J15: ipEgfr_Hbegf => ; kh*ipEgfr_Hbegf;
  J16: Egfr -> Egfr_Ar; k16*Egfr*0.165 - k_16*Egfr_Ar;
  J17: Egfr_Ar => iEgfr_Ar; ke*Egfr_Ar;
  J18: iEgfr_Ar => ; kh*iEgfr_Ar;
  J19: Egfr_Ar -> pEgfr_Ar; k19*Egfr_Ar - k_19*pEgfr_Ar;
  J20: pEgfr_Ar => ipEgfr_Ar; ke*pEgfr_Ar;
  J21: ipEgfr_Ar => ; kh*ipEgfr_Ar;
  J22: Egfr -> Egfr_Epgn; k22*Egfr*0.165 - k_22*Egfr_Epgn;
  J23: Egfr_Epgn => iEgfr_Epgn; ke*Egfr_Epgn;
  J24: iEgfr_Epgn => ; kh*iEgfr_Epgn;
  J25: Egfr_Epgn -> pEgfr_Epgn; k25*Egfr_Epgn - k_25*pEgfr_Epgn;
  J26: pEgfr_Epgn => ipEgfr_Epgn; ke*pEgfr_Epgn;
  J27: ipEgfr_Epgn => ; kh*ipEgfr_Epgn;

  // Unit definitions:
  unit nM = 1e-9 mole / litre;
  unit per_sec = 1 / second; per_sec is "s-1";
  unit nM_per_sec = 1;
  unit per_nMs = litre / (1e-9 mole * second); per_nMs is "nM-1 s-1";
  unit substance = 1e-9 mole; substance is "nmole";
  unit time_unit = second; time_unit is "s";
  unit per_nM = litre / (1e-9 mole);
  unit nM_per_s = 1e-9 mole / (litre * second); nM_per_s is "nM/s";
end
